Wed 10/28/2015
09:20 PM
;Model Desc: Two compartment Model, Using ADVAN3, TRANS4
;Project Name: nm7examples
;Project ID: NO PROJECT DESCRIPTION
$PROBLEM    RUN# Example 1 (from samp5l)
;; 1. Based on:0

;; 2. Description:

;;    2 compartment model

;; 3. Label:

;;    2CMT

;; 4. Structural model:

;;    ADVAN3 TRANS4

;; 5. Covariate model:

;;    None

;; 6. Inter-individual variability:

;;    CL, V1, Q, V2

;; 7. Inter-occasion variability:

;;    None

;; 8. Residual variability:

;;    proportional

;; 9. Estimation:

;;    FOCE INTER, SAEM, BAYES, IMP
$INPUT      C SET ID JID TIME DV=CONC AMT=DOSE RATE EVID MDV CMT CLX
            V1X QX V2X SDIX SDSX
$DATA       example1.csv IGNORE=C
$SUBROUTINE ADVAN3 TRANS4
;NTHETA=number of Thetas to be estimated

;NETA=number of Etas to be estimated (and to be described by NETAxBETA OMEGA matrix)

;NTHP=number of thetas which have a prior

;NETP=number of Omegas with prior

;Prior information is important for MCMC Bayesian analysis, not necessary for maximization

; methods
$PRIOR      NWPRI NTHETA=4,NETA=4,NTHP=4,NETP=4
$PK
; The thetas are MU modeled.  Best that there is a linear relationship between THETAs and Mus
;  The linear MU modeling of THETAS allows them to be efficiently Gibbs sampled.
MU_1=THETA(1)
MU_2=THETA(2)
MU_3=THETA(3)
MU_4=THETA(4)
CL=DEXP(MU_1+ETA(1))
V1=DEXP(MU_2+ETA(2))
Q=DEXP(MU_3+ETA(3))
V2=DEXP(MU_4+ETA(4))
S1=V1

STRT = 0
IF(ID.GT.50) STRT = 1

$ERROR
IPRED = F
Y = F + F*EPS(1)

; Initial values of THETA
$THETA  (0.001,2.0) ; [LN(CL)]
 (0.001,2.0) ; [LN(V1)]
 (0.001,2.0) ; [LN(Q)]
 (0.001,2.0) ; [LN(V2)]
;INITIAL values of OMEGA
$THETA  2.0 FIX
 2.0 FIX
 2.0 FIX
 2.0 FIX
; Variance to prior information of THETAS.  Because variances are very large, this
; means that the prior information to the THETAS is highly uninformative.
$THETA  4 FIX
; The first analysis is iterative two-stage, maximum of 500 iterations (NITER), iteration results
; are printed every 5 iterations, gradient precision (SIGL) is 4. Termination is tested on all of
; the population parameters (CTYPE=3), and for less then 2 significant digits change (NSIG).
; Prior information is not necessary for ITS, so NOPRIOR=1.  The intermediate and final results
; of the ITS method will be recoded in row/column format in example1.ext
$OMEGA  BLOCK(4)
 0.15  ;        [P]
 0.01  ;        [F]
 0.15  ;       [P]_
 0.01  ;       [F]_
 0.01  ;       [F]_
 0.15  ;       [P]_
 0.01  ;       [F]_
 0.01  ;       [F]_
 0.01  ;       [F]_
 0.15  ;       [P]_
;Initial value of SIGMA
$OMEGA  BLOCK(4) FIX
 10000
 0.00 10000
 0.00 0.00 10000
 0.00 0.00 0.0 10000
; Prior information to the OMEGAS.
$OMEGA  BLOCK(4) FIX
 0.2
 0.0 0.2
 0.0 0.0 0.2
 0.0 0.0 0.0 0.2
;Degrees of freedom to prior OMEGA matrix.  Because degrees of freedom is very low, equal to the
; the dimension of the prior OMEGA, this means that the prior information to the OMEGAS is
; highly uninformative
$SIGMA  0.6  ;        [P]
; Prior information of THETAS
$ESTIMATION METHOD=ITS INTERACTION FILE=example1.ext NITER=500 PRINT=5
            NOABORT SIGL=4 CTYPE=3 CITER=10 CALPHA=0.05 NOPRIOR=1
            NSIG=2
; The results of ITS are used as the initial values for the SAEM method.  A maximum of 3000

; stochastic iterations (NBURN) is requested, but may end early if statistical test determines

; that variations in all parameters is stationary (note that any settings from the previous $EST

; carries over to the next $EST statement, within a $PROB).  The SAEM is a Monte Carlo process,

; so setting the SEED assures repeatability of results.  Each iteration obtains only 2 Monte

; Carlo samples ISAMPLE), so they are very fast.  But many iterations are needed, so PRINT only

; every 100th iteration.  After the stochastic phase, 500 accumulation iterations will be

; Performed (NITER), to obtain good parameters estimates with little stochastic noise.

; As a new FILE has not been given, the SAEM results will append to example1.ext.
$ESTIMATION METHOD=SAEM INTERACTION NBURN=3000 NITER=500 PRINT=100
            SEED=1556678 ISAMPLE=2
; After the SAEM method, obtain good estimates of the marginal density (objective function),

; along with good estimates of the standard errors.  This is best done with importance sampling

; (IMP), performing the expectation step only (EONLY=1), so that final population parameters

; remain at the final SAEM result.  Five iterations (NITER) should allow the importance sampling

; proposal density to become stationary.  This is observed by the objective function settling

; to a particular value (with some stochastic noise).  By using 3000 Monte Carlo samples

; (ISAMPLE), this assures a precise assessment of standard errors.
$ESTIMATION METHOD=IMP MAPITER=0 INTERACTION EONLY=1 NITER=5
            ISAMPLE=3000 PRINT=1 SIGL=8 NOPRIOR=1
; The Bayesian analysis is performed.  While 10000 burn-in

; iterations are requested as a maximum, because the termination test is on (CTYPE<>0, set at the

; first $EST statement), and because the initial parameters are at the SAEM result, which is the

; maximum likelihood position, the analysis should settle down to a stationary distribution in

; several hundred iterations.  Prior information is also used to facilitate Bayesian analysis.

; The individual Bayesian iteration results are important, and may be need for post-processing

; analysis. So specify a separate FILE for the Bayesian analysis.
$ESTIMATION METHOD=BAYES INTERACTION FILE=example1.txt NBURN=10000
            NITER=10000 PRINT=100 NOPRIOR=0
; Just for old-times sake, let?s see what the traditional FOCE method will give us.

; And, remember to introduce a new FILE, so its results won?t append to our Bayesian FILE.

; Appending to example1.ext with the EM methods is fine.
$ESTIMATION METHOD=COND INTERACTION MAXEVAL=9999 NSIG=3 SIGL=10
            PRINT=5 NOABORT NOPRIOR=1 FILE=psn.ext
; Time for the standard error results.  You may request a more precise gradient precision (SIGL)

; that differed from that used during estimation.
$COVARIANCE MATRIX=R PRINT=E UNCONDITIONAL SIGL=12
; Print out results in tables. Include some of the new weighted residual types
$TABLE      ID TIME DV IPRED PRED EVID RES WRES CPRED CWRES EPRED ERES
            EWRES NOAPPEND ONEHEADER FILE=example1.sdtab NOPRINT
$TABLE      ID CL V1 Q V2 ETA1 ETA2 ETA3 ETA4 NOAPPEND ONEHEADER
            NOPRINT FILE=example1.patab

NM-TRAN MESSAGES
 WARNINGS AND ERRORS (IF ANY) FOR PROBLEM    1
 (WARNING  2) NM-TRAN INFERS THAT THE DATA ARE POPULATION.

1NONLINEAR MIXED EFFECTS MODEL PROGRAM (NONMEM) VERSION 7.3.0
 ORIGINALLY DEVELOPED BY STUART BEAL, LEWIS SHEINER, AND ALISON BOECKMANN
 CURRENT DEVELOPERS ARE ROBERT BAUER, ICON DEVELOPMENT SOLUTIONS,
 AND ALISON BOECKMANN. IMPLEMENTATION, EFFICIENCY, AND STANDARDIZATION
 PERFORMED BY NOUS INFOSYSTEMS.
 PROBLEM NO.:         1
 RUN# Example 1 (from samp5l)
 TOT. NO. OF OBS RECS:      500
 TOT. NO. OF INDIVIDUALS:    100
 TWO COMPARTMENT MODEL (ADVAN3)
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 #TBLN:      1
 #METH: Iterative Two Stage (No Prior)
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
 #TERM:
 OPTIMIZATION WAS COMPLETED

 ETABAR IS THE ARITHMETIC MEAN OF THE ETA-ESTIMATES,
 AND THE P-VALUE IS GIVEN FOR THE NULL HYPOTHESIS THAT THE TRUE MEAN IS 0.

 ETABAR:        -3.5306E-07 -1.0621E-06 -1.5708E-06 -1.8603E-07
 SE:             3.9119E-02  2.9342E-02  3.5669E-02  3.4353E-02
 N:                     100         100         100         100

 P VAL.:         9.9999E-01  9.9997E-01  9.9996E-01  1.0000E+00

 ETAshrink(%):   3.2921E+00  1.9372E+01  2.2485E+01  1.4424E+01
 EBVshrink(%):   3.2923E+00  1.9372E+01  2.2486E+01  1.4424E+01
 EPSshrink(%):   3.1728E+01

 #TERE:
 Elapsed estimation time in seconds:     5.24
 Elapsed covariance time in seconds:     0.09

 ********************                          ITERATIVE TWO STAGE (NO PRIOR)                        ********************
 #OBJT:**************                        FINAL VALUE OF OBJECTIVE FUNCTION                       ********************
 #OBJV:********************************************    -1120.262       **************************************************

 ********************                          ITERATIVE TWO STAGE (NO PRIOR)                        ********************
 ********************                             FINAL PARAMETER ESTIMATE                           ********************

 THETA - VECTOR OF FIXED EFFECTS PARAMETERS   *********
         TH 1      TH 2      TH 3      TH 4
         1.68E+00  1.59E+00  8.13E-01  2.37E+00

 OMEGA - COV MATRIX FOR RANDOM EFFECTS - ETAS  ********
            ETA1      ETA2      ETA3      ETA4
 ETA1
+        1.65E-01
 ETA2
+        4.62E-03  1.34E-01
 ETA3
+        6.35E-03  1.69E-02  2.14E-01
 ETA4
+       -1.53E-02  1.26E-02  5.33E-02  1.63E-01

 SIGMA - COV MATRIX FOR RANDOM EFFECTS - EPSILONS  ****
            EPS1
 EPS1
+        5.45E-02

 OMEGA - CORR MATRIX FOR RANDOM EFFECTS - ETAS  *******
            ETA1      ETA2      ETA3      ETA4
 ETA1
+        4.07E-01
 ETA2
+        3.11E-02  3.66E-01
 ETA3
+        3.38E-02  1.00E-01  4.62E-01
 ETA4
+       -9.33E-02  8.53E-02  2.85E-01  4.03E-01

 SIGMA - CORR MATRIX FOR RANDOM EFFECTS - EPSILONS  ***
            EPS1
 EPS1
+        2.33E-01

 ********************                          ITERATIVE TWO STAGE (NO PRIOR)                        ********************
 ********************                          STANDARD ERROR OF ESTIMATE (S)                        ********************

 THETA - VECTOR OF FIXED EFFECTS PARAMETERS   *********
         TH 1      TH 2      TH 3      TH 4
         4.62E-02  4.90E-02  6.53E-02  5.39E-02

 OMEGA - COV MATRIX FOR RANDOM EFFECTS - ETAS  ********
            ETA1      ETA2      ETA3      ETA4
 ETA1
+        2.90E-02
 ETA2
+        2.31E-02  3.49E-02
 ETA3
+        3.25E-02  3.83E-02  6.48E-02
 ETA4
+        2.76E-02  2.73E-02  4.50E-02  4.06E-02

 SIGMA - COV MATRIX FOR RANDOM EFFECTS - EPSILONS  ****
            EPS1
 EPS1
+        7.61E-03

 OMEGA - CORR MATRIX FOR RANDOM EFFECTS - ETAS  *******
            ETA1      ETA2      ETA3      ETA4
 ETA1
+        3.56E-02
 ETA2
+        1.53E-01  4.77E-02
 ETA3
+        1.71E-01  2.22E-01  7.01E-02
 ETA4
+        1.73E-01  1.79E-01  1.86E-01  5.04E-02

 SIGMA - CORR MATRIX FOR RANDOM EFFECTS - EPSILONS  ***
            EPS1
 EPS1
+        1.63E-02

 ********************                          ITERATIVE TWO STAGE (NO PRIOR)                        ********************
 ********************                        COVARIANCE MATRIX OF ESTIMATE (S)                       ********************

            TH 1      TH 2      TH 3      TH 4      OM11      OM12      OM13      OM14      OM22      OM23      OM24      OM33
             OM34      OM44      SG11
 TH 1
+        2.13E-03
 TH 2
+        3.70E-04  2.40E-03
 TH 3
+        3.77E-04  2.21E-04  4.26E-03
 TH 4
+       -1.52E-05  1.67E-04  1.61E-03  2.91E-03
 OM11
+       -2.51E-04  9.51E-05  5.83E-05 -9.67E-05  8.40E-04
 OM12
+        1.09E-05  1.74E-04  2.54E-05 -1.43E-04  3.14E-04  5.35E-04
 OM13
+       -1.72E-04 -8.84E-06 -2.67E-04  2.17E-04  1.44E-04  2.38E-04  1.06E-03
 OM14
+       -1.84E-04 -2.18E-04  1.34E-04  1.63E-04  2.24E-04  1.82E-04  5.47E-04  7.62E-04
 OM22
+       -3.90E-05 -2.28E-05 -2.18E-04 -1.24E-04  1.40E-04  2.40E-04  8.20E-05  1.37E-04  1.22E-03
 OM23
+       -8.29E-05 -8.04E-05  6.23E-05  1.21E-04  1.88E-04  4.06E-05 -6.24E-05 -2.93E-05  2.80E-04  1.47E-03
 OM24
+       -2.62E-04 -1.01E-04  1.32E-04  1.46E-04  1.14E-04  8.62E-05  2.40E-05  9.07E-05  3.78E-04  5.88E-04  7.47E-04
 OM33
+       -3.31E-04 -3.25E-04 -2.61E-04  4.94E-04  2.20E-04  1.45E-04  8.13E-04  3.81E-04  5.41E-04  4.36E-04  4.02E-04  4.20E-03
 OM34
+       -2.35E-05 -8.78E-05  2.28E-04  2.47E-04  2.49E-04  1.15E-04  2.89E-04  2.11E-04  3.75E-04  3.82E-04  3.30E-04  2.18E-03
          2.03E-03
 OM44
+        2.93E-05 -1.97E-05  1.74E-04 -3.14E-04  2.71E-04  1.26E-04  6.07E-05  1.49E-04  3.24E-04  2.03E-04  2.25E-04  1.10E-03
          1.34E-03  1.65E-03
 SG11
+        4.47E-05  6.18E-05 -1.16E-06  3.01E-05 -5.92E-05 -4.22E-05 -5.65E-05 -7.69E-05 -7.90E-05  7.95E-06 -3.98E-05 -9.36E-05
         -1.06E-04 -1.16E-04  5.79E-05

 ********************                          ITERATIVE TWO STAGE (NO PRIOR)                        ********************
 ********************                        CORRELATION MATRIX OF ESTIMATE (S)                      ********************

            TH 1      TH 2      TH 3      TH 4      OM11      OM12      OM13      OM14      OM22      OM23      OM24      OM33
             OM34      OM44      SG11
 TH 1
+        4.62E-02
 TH 2
+        1.63E-01  4.90E-02
 TH 3
+        1.25E-01  6.90E-02  6.53E-02
 TH 4
+       -6.11E-03  6.32E-02  4.58E-01  5.39E-02
 OM11
+       -1.88E-01  6.70E-02  3.08E-02 -6.19E-02  2.90E-02
 OM12
+        1.02E-02  1.54E-01  1.68E-02 -1.15E-01  4.68E-01  2.31E-02
 OM13
+       -1.15E-01 -5.55E-03 -1.26E-01  1.24E-01  1.53E-01  3.17E-01  3.25E-02
 OM14
+       -1.44E-01 -1.61E-01  7.43E-02  1.10E-01  2.80E-01  2.84E-01  6.09E-01  2.76E-02
 OM22
+       -2.42E-02 -1.33E-02 -9.56E-02 -6.57E-02  1.39E-01  2.97E-01  7.23E-02  1.42E-01  3.49E-02
 OM23
+       -4.69E-02 -4.28E-02  2.49E-02  5.85E-02  1.70E-01  4.58E-02 -5.02E-02 -2.78E-02  2.10E-01  3.83E-02
 OM24
+       -2.08E-01 -7.57E-02  7.37E-02  9.90E-02  1.45E-01  1.36E-01  2.70E-02  1.20E-01  3.96E-01  5.62E-01  2.73E-02
 OM33
+       -1.11E-01 -1.02E-01 -6.16E-02  1.41E-01  1.17E-01  9.68E-02  3.86E-01  2.13E-01  2.39E-01  1.76E-01  2.27E-01  6.48E-02
 OM34
+       -1.13E-02 -3.98E-02  7.75E-02  1.02E-01  1.91E-01  1.10E-01  1.98E-01  1.70E-01  2.38E-01  2.21E-01  2.68E-01  7.46E-01
          4.50E-02
 OM44
+        1.56E-02 -9.87E-03  6.58E-02 -1.43E-01  2.30E-01  1.34E-01  4.60E-02  1.33E-01  2.28E-01  1.31E-01  2.02E-01  4.16E-01
          7.32E-01  4.06E-02
 SG11
+        1.27E-01  1.66E-01 -2.34E-03  7.34E-02 -2.69E-01 -2.40E-01 -2.28E-01 -3.66E-01 -2.97E-01  2.73E-02 -1.91E-01 -1.90E-01
         -3.09E-01 -3.74E-01  7.61E-03
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
 ********************                          ITERATIVE TWO STAGE (NO PRIOR)                        ********************
 ********************                    EIGENVALUES OF COR MATRIX OF ESTIMATE (S)                   ********************

             1         2         3         4         5         6         7         8         9        10        11        12
             13        14        15
         1.29E-01  2.52E-01  3.20E-01  3.38E-01  4.49E-01  5.04E-01  6.18E-01  7.73E-01  9.51E-01  1.06E+00  1.37E+00  1.44E+00
          1.57E+00  1.76E+00  3.45E+00
 #TBLN:      2
 #METH: Stochastic Approximation Expectation-Maximization (No Prior)
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
 #TERM:
 STOCHASTIC PORTION WAS COMPLETED
 REDUCED STOCHASTIC PORTION WAS COMPLETED

 ETABAR IS THE ARITHMETIC MEAN OF THE ETA-ESTIMATES,
 AND THE P-VALUE IS GIVEN FOR THE NULL HYPOTHESIS THAT THE TRUE MEAN IS 0.

 ETABAR:        -2.6371E-05 -6.0331E-05 -1.2382E-05  2.2153E-06
 SE:             3.8808E-02  3.1263E-02  3.1894E-02  3.5379E-02
 N:                     100         100         100         100

 P VAL.:         9.9946E-01  9.9846E-01  9.9969E-01  9.9995E-01

 ETAshrink(%):   3.6915E+00  2.1278E+01  2.7772E+01  1.5419E+01
 EBVshrink(%):   3.6925E+00  2.1279E+01  2.7775E+01  1.5414E+01
 EPSshrink(%):   2.9315E+01

 #TERE:
 Elapsed estimation time in seconds:    40.48
 Elapsed covariance time in seconds:     0.05

 ********************           STOCHASTIC APPROXIMATION EXPECTATION-MAXIMIZATION (NO PRIOR)         ********************
 #OBJT:**************                        FINAL VALUE OF LIKELIHOOD FUNCTION                      ********************
 #OBJV:********************************************    -2477.376       **************************************************

 ********************           STOCHASTIC APPROXIMATION EXPECTATION-MAXIMIZATION (NO PRIOR)         ********************
 ********************                             FINAL PARAMETER ESTIMATE                           ********************

 THETA - VECTOR OF FIXED EFFECTS PARAMETERS   *********
         TH 1      TH 2      TH 3      TH 4
         1.63E+00  1.55E+00  7.25E-01  2.34E+00

 OMEGA - COV MATRIX FOR RANDOM EFFECTS - ETAS  ********
            ETA1      ETA2      ETA3      ETA4
 ETA1
+        1.64E-01
 ETA2
+       -1.59E-03  1.59E-01
 ETA3
+        1.17E-02 -8.03E-03  1.97E-01
 ETA4
+       -1.64E-02  2.21E-02  4.36E-02  1.77E-01

 SIGMA - COV MATRIX FOR RANDOM EFFECTS - EPSILONS  ****
            EPS1
 EPS1
+        5.50E-02

 OMEGA - CORR MATRIX FOR RANDOM EFFECTS - ETAS  *******
            ETA1      ETA2      ETA3      ETA4
 ETA1
+        4.05E-01
 ETA2
+       -9.84E-03  3.99E-01
 ETA3
+        6.53E-02 -4.53E-02  4.44E-01
 ETA4
+       -9.60E-02  1.32E-01  2.34E-01  4.20E-01

 SIGMA - CORR MATRIX FOR RANDOM EFFECTS - EPSILONS  ***
            EPS1
 EPS1
+        2.35E-01

 ********************           STOCHASTIC APPROXIMATION EXPECTATION-MAXIMIZATION (NO PRIOR)         ********************
 ********************                          STANDARD ERROR OF ESTIMATE (S)                        ********************

 THETA - VECTOR OF FIXED EFFECTS PARAMETERS   *********
         TH 1      TH 2      TH 3      TH 4
         4.60E-02  5.47E-02  6.82E-02  5.80E-02

 OMEGA - COV MATRIX FOR RANDOM EFFECTS - ETAS  ********
            ETA1      ETA2      ETA3      ETA4
 ETA1
+        2.90E-02
 ETA2
+        2.40E-02  4.19E-02
 ETA3
+        3.30E-02  4.77E-02  6.17E-02
 ETA4
+        2.66E-02  3.32E-02  4.41E-02  4.54E-02

 SIGMA - COV MATRIX FOR RANDOM EFFECTS - EPSILONS  ****
            EPS1
 EPS1
+        7.41E-03

 OMEGA - CORR MATRIX FOR RANDOM EFFECTS - ETAS  *******
            ETA1      ETA2      ETA3      ETA4
 ETA1
+        3.58E-02
 ETA2
+        1.49E-01  5.25E-02
 ETA3
+        1.79E-01  2.70E-01  6.95E-02
 ETA4
+        1.59E-01  1.87E-01  1.94E-01  5.40E-02

 SIGMA - CORR MATRIX FOR RANDOM EFFECTS - EPSILONS  ***
            EPS1
 EPS1
+        1.58E-02

 ********************           STOCHASTIC APPROXIMATION EXPECTATION-MAXIMIZATION (NO PRIOR)         ********************
 ********************                        COVARIANCE MATRIX OF ESTIMATE (S)                       ********************

            TH 1      TH 2      TH 3      TH 4      OM11      OM12      OM13      OM14      OM22      OM23      OM24      OM33
             OM34      OM44      SG11
 TH 1
+        2.12E-03
 TH 2
+        3.21E-04  3.00E-03
 TH 3
+        4.31E-04 -9.60E-05  4.65E-03
 TH 4
+        6.53E-05  3.45E-04  1.70E-03  3.37E-03
 OM11
+       -2.09E-04  1.50E-04 -1.34E-06 -1.92E-04  8.40E-04
 OM12
+        7.10E-05  1.05E-04 -3.64E-05 -2.62E-04  2.62E-04  5.78E-04
 OM13
+       -1.10E-04  1.77E-05 -4.83E-04  1.29E-04  2.17E-04  8.17E-05  1.09E-03
 OM14
+       -1.60E-04 -2.45E-04 -1.82E-05 -1.58E-05  2.14E-04  9.77E-05  4.60E-04  7.07E-04
 OM22
+       -1.64E-04 -2.99E-04 -2.99E-04 -3.18E-04  5.76E-05  2.67E-04 -1.04E-04  1.17E-04  1.75E-03
 OM23
+       -1.82E-04  1.76E-04  4.64E-04 -8.93E-05  1.83E-04  9.42E-05 -1.37E-04 -4.20E-05  1.67E-04  2.27E-03
 OM24
+       -3.51E-04 -8.96E-05  1.64E-04 -6.60E-05  8.14E-05  1.76E-04 -4.13E-05  5.35E-05  5.51E-04  7.95E-04  1.10E-03
 OM33
+       -4.17E-04 -3.67E-04 -3.25E-04  1.83E-04  1.97E-04  4.53E-05  6.85E-04  1.68E-04  2.83E-04  7.44E-05  2.84E-04  3.80E-03
 OM34
+       -1.28E-04 -1.65E-04  1.83E-04 -2.60E-04  1.73E-04  7.17E-05  2.62E-05  2.45E-05  2.83E-04  4.09E-04  2.62E-04  1.85E-03
          1.95E-03
 OM44
+       -1.54E-04 -1.40E-04 -6.20E-05 -8.61E-04  2.11E-04  1.38E-04 -1.63E-04 -7.80E-06  4.07E-04  3.42E-04  4.41E-04  9.10E-04
          1.36E-03  2.06E-03
 SG11
+        2.43E-05  7.01E-05 -1.00E-05  7.81E-05 -4.93E-05 -3.06E-05 -1.09E-05 -3.99E-05 -7.58E-05 -5.01E-05 -5.15E-05 -4.16E-05
         -8.32E-05 -1.22E-04  5.49E-05

 ********************           STOCHASTIC APPROXIMATION EXPECTATION-MAXIMIZATION (NO PRIOR)         ********************
 ********************                        CORRELATION MATRIX OF ESTIMATE (S)                      ********************

            TH 1      TH 2      TH 3      TH 4      OM11      OM12      OM13      OM14      OM22      OM23      OM24      OM33
             OM34      OM44      SG11
 TH 1
+        4.60E-02
 TH 2
+        1.27E-01  5.47E-02
 TH 3
+        1.37E-01 -2.57E-02  6.82E-02
 TH 4
+        2.45E-02  1.09E-01  4.30E-01  5.80E-02
 OM11
+       -1.57E-01  9.44E-02 -6.77E-04 -1.14E-01  2.90E-02
 OM12
+        6.43E-02  8.02E-02 -2.22E-02 -1.88E-01  3.76E-01  2.40E-02
 OM13
+       -7.27E-02  9.81E-03 -2.15E-01  6.75E-02  2.26E-01  1.03E-01  3.30E-02
 OM14
+       -1.31E-01 -1.68E-01 -1.00E-02 -1.03E-02  2.78E-01  1.53E-01  5.24E-01  2.66E-02
 OM22
+       -8.53E-02 -1.31E-01 -1.05E-01 -1.31E-01  4.74E-02  2.66E-01 -7.53E-02  1.05E-01  4.19E-02
 OM23
+       -8.30E-02  6.73E-02  1.43E-01 -3.23E-02  1.32E-01  8.22E-02 -8.73E-02 -3.31E-02  8.35E-02  4.77E-02
 OM24
+       -2.30E-01 -4.93E-02  7.24E-02 -3.43E-02  8.46E-02  2.21E-01 -3.78E-02  6.07E-02  3.96E-01  5.03E-01  3.32E-02
 OM33
+       -1.47E-01 -1.09E-01 -7.72E-02  5.11E-02  1.10E-01  3.05E-02  3.36E-01  1.03E-01  1.09E-01  2.53E-02  1.39E-01  6.17E-02
 OM34
+       -6.31E-02 -6.82E-02  6.08E-02 -1.01E-01  1.35E-01  6.76E-02  1.80E-02  2.09E-02  1.53E-01  1.94E-01  1.79E-01  6.79E-01
          4.41E-02
 OM44
+       -7.38E-02 -5.62E-02 -2.00E-02 -3.27E-01  1.61E-01  1.27E-01 -1.09E-01 -6.47E-03  2.14E-01  1.58E-01  2.93E-01  3.25E-01
          6.77E-01  4.54E-02
 SG11
+        7.13E-02  1.73E-01 -1.98E-02  1.82E-01 -2.30E-01 -1.72E-01 -4.48E-02 -2.03E-01 -2.44E-01 -1.42E-01 -2.10E-01 -9.10E-02
         -2.54E-01 -3.62E-01  7.41E-03
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
 ********************           STOCHASTIC APPROXIMATION EXPECTATION-MAXIMIZATION (NO PRIOR)         ********************
 ********************                    EIGENVALUES OF COR MATRIX OF ESTIMATE (S)                   ********************

             1         2         3         4         5         6         7         8         9        10        11        12
             13        14        15
         1.47E-01  2.88E-01  3.33E-01  3.95E-01  4.96E-01  5.63E-01  7.01E-01  8.15E-01  9.61E-01  1.13E+00  1.27E+00  1.50E+00
          1.56E+00  1.84E+00  2.99E+00
 #TBLN:      3
 #METH: Objective Function Evaluation by Importance Sampling (No Prior)
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
 #TERM:
 EXPECTATION ONLY PROCESS COMPLETED

 ETABAR IS THE ARITHMETIC MEAN OF THE ETA-ESTIMATES,
 AND THE P-VALUE IS GIVEN FOR THE NULL HYPOTHESIS THAT THE TRUE MEAN IS 0.

 ETABAR:         2.9944E-03  2.5403E-03  6.2736E-03  3.4277E-03
 SE:             3.8921E-02  3.0490E-02  3.2048E-02  3.4488E-02
 N:                     100         100         100         100

 P VAL.:         9.3868E-01  9.3360E-01  8.4480E-01  9.2083E-01

 ETAshrink(%):   3.4087E+00  2.3225E+01  2.7424E+01  1.7550E+01
 EBVshrink(%):   3.6776E+00  2.1445E+01  2.8427E+01  1.5574E+01
 EPSshrink(%):   3.0800E+01

 #TERE:
 Elapsed estimation time in seconds:    13.19
 Elapsed covariance time in seconds:     3.65

 ********************         OBJECTIVE FUNCTION EVALUATION BY IMPORTANCE SAMPLING (NO PRIOR)        ********************
 #OBJT:**************                        FINAL VALUE OF OBJECTIVE FUNCTION                       ********************
 #OBJV:********************************************    -1145.027       **************************************************

 ********************         OBJECTIVE FUNCTION EVALUATION BY IMPORTANCE SAMPLING (NO PRIOR)        ********************
 ********************                             FINAL PARAMETER ESTIMATE                           ********************

 THETA - VECTOR OF FIXED EFFECTS PARAMETERS   *********
         TH 1      TH 2      TH 3      TH 4
         1.63E+00  1.55E+00  7.25E-01  2.34E+00

 OMEGA - COV MATRIX FOR RANDOM EFFECTS - ETAS  ********
            ETA1      ETA2      ETA3      ETA4
 ETA1
+        1.64E-01
 ETA2
+       -1.59E-03  1.59E-01
 ETA3
+        1.17E-02 -8.03E-03  1.97E-01
 ETA4
+       -1.64E-02  2.21E-02  4.36E-02  1.77E-01

 SIGMA - COV MATRIX FOR RANDOM EFFECTS - EPSILONS  ****
            EPS1
 EPS1
+        5.50E-02

 OMEGA - CORR MATRIX FOR RANDOM EFFECTS - ETAS  *******
            ETA1      ETA2      ETA3      ETA4
 ETA1
+        4.05E-01
 ETA2
+       -9.84E-03  3.99E-01
 ETA3
+        6.53E-02 -4.53E-02  4.44E-01
 ETA4
+       -9.60E-02  1.32E-01  2.34E-01  4.20E-01

 SIGMA - CORR MATRIX FOR RANDOM EFFECTS - EPSILONS  ***
            EPS1
 EPS1
+        2.35E-01

 ********************         OBJECTIVE FUNCTION EVALUATION BY IMPORTANCE SAMPLING (NO PRIOR)        ********************
 ********************                          STANDARD ERROR OF ESTIMATE (R)                        ********************

 THETA - VECTOR OF FIXED EFFECTS PARAMETERS   *********
         TH 1      TH 2      TH 3      TH 4
         4.30E-02  5.35E-02  6.85E-02  5.44E-02

 OMEGA - COV MATRIX FOR RANDOM EFFECTS - ETAS  ********
            ETA1      ETA2      ETA3      ETA4
 ETA1
+        2.67E-02
 ETA2
+        2.38E-02  3.93E-02
 ETA3
+        2.85E-02  3.76E-02  6.15E-02
 ETA4
+        2.49E-02  2.93E-02  3.89E-02  4.36E-02

 SIGMA - COV MATRIX FOR RANDOM EFFECTS - EPSILONS  ****
            EPS1
 EPS1
+        6.63E-03

 OMEGA - CORR MATRIX FOR RANDOM EFFECTS - ETAS  *******
            ETA1      ETA2      ETA3      ETA4
 ETA1
+        3.30E-02
 ETA2
+        1.47E-01  4.92E-02
 ETA3
+        1.54E-01  2.12E-01  6.93E-02
 ETA4
+        1.50E-01  1.67E-01  1.69E-01  5.18E-02

 SIGMA - CORR MATRIX FOR RANDOM EFFECTS - EPSILONS  ***
            EPS1
 EPS1
+        1.41E-02

 ********************         OBJECTIVE FUNCTION EVALUATION BY IMPORTANCE SAMPLING (NO PRIOR)        ********************
 ********************                        COVARIANCE MATRIX OF ESTIMATE (R)                       ********************

            TH 1      TH 2      TH 3      TH 4      OM11      OM12      OM13      OM14      OM22      OM23      OM24      OM33
             OM34      OM44      SG11
 TH 1
+        1.85E-03
 TH 2
+        2.80E-04  2.86E-03
 TH 3
+        5.36E-04  1.67E-04  4.69E-03
 TH 4
+        1.69E-04  4.95E-04  1.87E-03  2.96E-03
 OM11
+        4.14E-05  1.62E-04  1.62E-04  1.30E-04  7.16E-04
 OM12
+        6.65E-05  1.61E-04  2.39E-04  1.40E-04  1.40E-04  5.64E-04
 OM13
+        5.40E-05  2.08E-04  1.81E-05  1.36E-04  2.39E-04  1.06E-04  8.14E-04
 OM14
+        5.49E-05  1.50E-04  1.74E-04  1.02E-04  1.21E-04  1.69E-04  3.87E-04  6.18E-04
 OM22
+       -1.12E-04 -3.84E-04 -4.81E-04 -2.51E-04 -6.57E-05  3.56E-06 -7.72E-05 -5.33E-05  1.54E-03
 OM23
+        7.97E-05  2.81E-04  6.72E-04  1.64E-04  9.34E-05  2.44E-04  1.07E-04  1.17E-04 -2.25E-04  1.42E-03
 OM24
+       -5.18E-06 -8.03E-05  1.77E-04  1.55E-04  2.42E-05  5.91E-05  4.98E-05  8.60E-05  2.66E-04  4.03E-04  8.59E-04
 OM33
+        5.82E-05 -7.72E-05  2.05E-04  1.57E-04  1.77E-04  1.57E-04  5.74E-04  3.41E-04 -7.76E-05  9.33E-05  1.33E-04  3.79E-03
 OM34
+        3.40E-05  4.46E-06 -3.14E-05 -1.05E-04  9.23E-05  1.12E-04  2.76E-04  2.81E-04 -1.92E-06  1.98E-04  1.64E-04  1.62E-03
          1.52E-03
 OM44
+        7.49E-06  7.49E-05 -2.35E-04 -3.83E-05  6.69E-05  6.90E-05  1.79E-04  1.72E-04  1.37E-04  1.12E-04  3.98E-04  7.44E-04
          1.06E-03  1.90E-03
 SG11
+        4.35E-06  2.19E-05  1.63E-05  1.16E-05 -1.65E-05 -1.74E-05 -3.20E-05 -2.75E-05 -4.57E-05 -6.90E-06 -1.79E-05 -1.52E-04
         -9.16E-05 -7.75E-05  4.39E-05

 ********************         OBJECTIVE FUNCTION EVALUATION BY IMPORTANCE SAMPLING (NO PRIOR)        ********************
 ********************                        CORRELATION MATRIX OF ESTIMATE (R)                      ********************

            TH 1      TH 2      TH 3      TH 4      OM11      OM12      OM13      OM14      OM22      OM23      OM24      OM33
             OM34      OM44      SG11
 TH 1
+        4.30E-02
 TH 2
+        1.22E-01  5.35E-02
 TH 3
+        1.82E-01  4.56E-02  6.85E-02
 TH 4
+        7.23E-02  1.70E-01  5.02E-01  5.44E-02
 OM11
+        3.60E-02  1.13E-01  8.86E-02  8.92E-02  2.67E-02
 OM12
+        6.52E-02  1.26E-01  1.47E-01  1.08E-01  2.20E-01  2.38E-02
 OM13
+        4.40E-02  1.36E-01  9.25E-03  8.76E-02  3.13E-01  1.56E-01  2.85E-02
 OM14
+        5.14E-02  1.13E-01  1.02E-01  7.56E-02  1.82E-01  2.87E-01  5.45E-01  2.49E-02
 OM22
+       -6.64E-02 -1.83E-01 -1.79E-01 -1.18E-01 -6.25E-02  3.81E-03 -6.89E-02 -5.46E-02  3.93E-02
 OM23
+        4.93E-02  1.39E-01  2.61E-01  7.99E-02  9.27E-02  2.73E-01  9.92E-02  1.25E-01 -1.52E-01  3.76E-02
 OM24
+       -4.12E-03 -5.12E-02  8.80E-02  9.71E-02  3.08E-02  8.49E-02  5.96E-02  1.18E-01  2.31E-01  3.65E-01  2.93E-02
 OM33
+        2.20E-02 -2.34E-02  4.86E-02  4.70E-02  1.07E-01  1.08E-01  3.27E-01  2.23E-01 -3.21E-02  4.03E-02  7.36E-02  6.15E-02
 OM34
+        2.03E-02  2.14E-03 -1.18E-02 -4.94E-02  8.86E-02  1.21E-01  2.48E-01  2.90E-01 -1.25E-03  1.35E-01  1.43E-01  6.76E-01
          3.89E-02
 OM44
+        4.00E-03  3.21E-02 -7.89E-02 -1.61E-02  5.74E-02  6.66E-02  1.44E-01  1.59E-01  8.01E-02  6.86E-02  3.12E-01  2.77E-01
          6.25E-01  4.36E-02
 SG11
+        1.53E-02  6.17E-02  3.60E-02  3.21E-02 -9.31E-02 -1.10E-01 -1.69E-01 -1.67E-01 -1.76E-01 -2.76E-02 -9.20E-02 -3.74E-01
         -3.55E-01 -2.68E-01  6.63E-03
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
 ********************         OBJECTIVE FUNCTION EVALUATION BY IMPORTANCE SAMPLING (NO PRIOR)        ********************
 ********************                    EIGENVALUES OF COR MATRIX OF ESTIMATE (R)                   ********************

             1         2         3         4         5         6         7         8         9        10        11        12
             13        14        15
         1.74E-01  3.52E-01  4.23E-01  4.83E-01  5.98E-01  7.11E-01  8.10E-01  8.70E-01  9.04E-01  9.68E-01  1.08E+00  1.22E+00
          1.43E+00  2.02E+00  2.97E+00
 #TBLN:      4
 #METH: MCMC Bayesian Analysis
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
 #TERM:
 BURN-IN WAS COMPLETED
 STATISTICAL PORTION WAS COMPLETED

 #TERE:
 Elapsed estimation time in seconds:   145.04
 Elapsed covariance time in seconds:     0.00

 ********************                              MCMC BAYESIAN ANALYSIS                            ********************
 #OBJT:**************                       AVERAGE VALUE OF LIKELIHOOD FUNCTION                     ********************
 #OBJV:********************************************    -2313.897       **************************************************
 #OBJS:********************************************       43.435 (STD) **************************************************

 ********************                              MCMC BAYESIAN ANALYSIS                            ********************
 ********************                             FINAL PARAMETER ESTIMATE                           ********************

 THETA - VECTOR OF FIXED EFFECTS PARAMETERS   *********
         TH 1      TH 2      TH 3      TH 4
         1.63E+00  1.56E+00  7.46E-01  2.35E+00

 OMEGA - COV MATRIX FOR RANDOM EFFECTS - ETAS  ********
            ETA1      ETA2      ETA3      ETA4
 ETA1
+        1.77E-01
 ETA2
+       -4.28E-04  1.56E-01
 ETA3
+        1.26E-02 -7.13E-04  1.98E-01
 ETA4
+       -1.79E-02  1.45E-02  2.68E-02  1.66E-01

 SIGMA - COV MATRIX FOR RANDOM EFFECTS - EPSILONS  ****
            EPS1
 EPS1
+        5.80E-02

 OMEGA - CORR MATRIX FOR RANDOM EFFECTS - ETAS  *******
            ETA1      ETA2      ETA3      ETA4
 ETA1
+        4.19E-01
 ETA2
+       -4.31E-03  3.93E-01
 ETA3
+        6.32E-02 -3.97E-03  4.40E-01
 ETA4
+       -1.09E-01  8.69E-02  1.28E-01  4.04E-01

 SIGMA - CORR MATRIX FOR RANDOM EFFECTS - EPSILONS  ***
            EPS1
 EPS1
+        2.40E-01

 ********************                              MCMC BAYESIAN ANALYSIS                            ********************
 ********************                STANDARD ERROR OF ESTIMATE (From Sample Variance)               ********************

 THETA - VECTOR OF FIXED EFFECTS PARAMETERS   *********
         TH 1      TH 2      TH 3      TH 4
         4.48E-02  5.24E-02  6.68E-02  5.27E-02

 OMEGA - COV MATRIX FOR RANDOM EFFECTS - ETAS  ********
            ETA1      ETA2      ETA3      ETA4
 ETA1
+        2.85E-02
 ETA2
+        2.28E-02  3.47E-02
 ETA3
+        2.76E-02  3.33E-02  5.84E-02
 ETA4
+        2.31E-02  2.65E-02  3.39E-02  3.63E-02

 SIGMA - COV MATRIX FOR RANDOM EFFECTS - EPSILONS  ****
            EPS1
 EPS1
+        6.88E-03

 OMEGA - CORR MATRIX FOR RANDOM EFFECTS - ETAS  *******
            ETA1      ETA2      ETA3      ETA4
 ETA1
+        3.34E-02
 ETA2
+        1.35E-01  4.34E-02
 ETA3
+        1.43E-01  1.90E-01  6.50E-02
 ETA4
+        1.35E-01  1.58E-01  1.70E-01  4.42E-02

 SIGMA - CORR MATRIX FOR RANDOM EFFECTS - EPSILONS  ***
            EPS1
 EPS1
+        1.42E-02

 ********************                              MCMC BAYESIAN ANALYSIS                            ********************
 ********************               COVARIANCE MATRIX OF ESTIMATE (From Sample Variance)             ********************

            TH 1      TH 2      TH 3      TH 4      OM11      OM12      OM13      OM14      OM22      OM23      OM24      OM33
             OM34      OM44      SG11
 TH 1
+        2.00E-03
 TH 2
+        2.68E-04  2.74E-03
 TH 3
+        5.17E-04  1.75E-04  4.46E-03
 TH 4
+        1.67E-04  3.95E-04  1.60E-03  2.78E-03
 OM11
+        6.39E-05  1.54E-04  1.03E-04  8.90E-05  8.11E-04
 OM12
+        5.73E-05  1.61E-04  1.66E-04  6.58E-05  1.13E-04  5.19E-04
 OM13
+        5.13E-05  1.44E-04 -2.26E-06  1.20E-04  1.94E-04  5.08E-05  7.64E-04
 OM14
+        4.52E-05  1.14E-04  1.64E-04  9.75E-05  5.60E-05  9.15E-05  2.62E-04  5.34E-04
 OM22
+       -7.93E-05 -2.36E-04 -3.64E-04 -2.03E-04 -4.97E-05 -5.88E-06 -5.90E-05 -3.94E-05  1.20E-03
 OM23
+        2.30E-05  1.46E-04  4.98E-04  9.47E-05  6.03E-05  1.79E-04  3.45E-05  4.83E-05 -7.34E-05  1.11E-03
 OM24
+       -1.14E-05 -4.03E-05  1.67E-04  1.50E-04 -1.80E-06  1.90E-05  1.21E-05  5.49E-05  1.62E-04  2.89E-04  7.01E-04
 OM33
+       -9.21E-06 -2.77E-04  2.28E-04  1.54E-04  7.63E-05  6.70E-05  3.16E-04  1.42E-04  1.72E-05  6.12E-05  1.45E-04  3.41E-03
 OM34
+        2.70E-05 -8.86E-05  7.79E-05 -5.79E-06  4.67E-05  5.28E-05  9.55E-05  1.50E-04  1.09E-05  6.08E-05  1.06E-04  1.19E-03
          1.15E-03
 OM44
+        6.92E-05  3.92E-05 -2.34E-05  1.16E-04  4.74E-05  4.07E-05  6.10E-05  5.28E-05  6.77E-05 -1.50E-05  1.92E-04  4.85E-04
          6.42E-04  1.32E-03
 SG11
+        6.67E-06  2.86E-05  1.36E-05  6.24E-06 -8.36E-06 -1.54E-05 -1.43E-05 -1.56E-05 -3.82E-05 -9.50E-07 -1.49E-05 -1.21E-04
         -7.16E-05 -5.92E-05  4.73E-05

 ********************                              MCMC BAYESIAN ANALYSIS                            ********************
 ********************              CORRELATION MATRIX OF ESTIMATE (From Sample Variance)             ********************

            TH 1      TH 2      TH 3      TH 4      OM11      OM12      OM13      OM14      OM22      OM23      OM24      OM33
             OM34      OM44      SG11
 TH 1
+        4.48E-02
 TH 2
+        1.14E-01  5.24E-02
 TH 3
+        1.73E-01  5.01E-02  6.68E-02
 TH 4
+        7.07E-02  1.43E-01  4.53E-01  5.27E-02
 OM11
+        5.01E-02  1.03E-01  5.39E-02  5.92E-02  2.85E-02
 OM12
+        5.61E-02  1.35E-01  1.09E-01  5.48E-02  1.74E-01  2.28E-02
 OM13
+        4.15E-02  9.92E-02 -1.22E-03  8.21E-02  2.47E-01  8.07E-02  2.76E-02
 OM14
+        4.37E-02  9.44E-02  1.06E-01  8.00E-02  8.51E-02  1.74E-01  4.10E-01  2.31E-02
 OM22
+       -5.10E-02 -1.30E-01 -1.57E-01 -1.11E-01 -5.03E-02 -7.44E-03 -6.15E-02 -4.91E-02  3.47E-02
 OM23
+        1.54E-02  8.35E-02  2.24E-01  5.40E-02  6.36E-02  2.36E-01  3.75E-02  6.28E-02 -6.35E-02  3.33E-02
 OM24
+       -9.59E-03 -2.90E-02  9.46E-02  1.08E-01 -2.38E-03  3.14E-02  1.65E-02  8.97E-02  1.76E-01  3.27E-01  2.65E-02
 OM33
+       -3.52E-03 -9.04E-02  5.84E-02  5.01E-02  4.59E-02  5.04E-02  1.96E-01  1.06E-01  8.47E-03  3.15E-02  9.34E-02  5.84E-02
 OM34
+        1.78E-02 -4.99E-02  3.44E-02 -3.24E-03  4.84E-02  6.84E-02  1.02E-01  1.91E-01  9.26E-03  5.39E-02  1.19E-01  6.02E-01
          3.39E-02
 OM44
+        4.25E-02  2.06E-02 -9.62E-03  6.04E-02  4.57E-02  4.91E-02  6.07E-02  6.29E-02  5.37E-02 -1.24E-02  2.00E-01  2.28E-01
          5.22E-01  3.63E-02
 SG11
+        2.17E-02  7.92E-02  2.95E-02  1.72E-02 -4.27E-02 -9.80E-02 -7.53E-02 -9.79E-02 -1.60E-01 -4.15E-03 -8.20E-02 -3.01E-01
         -3.07E-01 -2.37E-01  6.88E-03
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
 ********************                              MCMC BAYESIAN ANALYSIS                            ********************
 ********************           EIGENVALUES OF COR MATRIX OF ESTIMATE (From Sample Variance)         ********************

             1         2         3         4         5         6         7         8         9        10        11        12
             13        14        15
         2.73E-01  4.35E-01  5.39E-01  5.72E-01  6.84E-01  7.37E-01  8.74E-01  9.10E-01  9.50E-01  9.93E-01  1.05E+00  1.26E+00
          1.41E+00  1.88E+00  2.43E+00
 #TBLN:      5
 #METH: First Order Conditional Estimation with Interaction (No Prior)
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
 #TERM:
0MINIMIZATION SUCCESSFUL
 NO. OF FUNCTION EVALUATIONS USED:      321
 NO. OF SIG. DIGITS IN FINAL EST.:  4.8

 ETABAR IS THE ARITHMETIC MEAN OF THE ETA-ESTIMATES,
 AND THE P-VALUE IS GIVEN FOR THE NULL HYPOTHESIS THAT THE TRUE MEAN IS 0.

 ETABAR:        -1.0375E-06 -1.1916E-02 -3.4865E-03 -1.1596E-02
 SE:             3.9193E-02  2.8850E-02  3.2735E-02  3.3062E-02
 N:                     100         100         100         100

 P VAL.:         9.9998E-01  6.7958E-01  9.1518E-01  7.2580E-01

 ETAshrink(%):   3.0463E+00  2.0021E+01  2.4030E+01  1.4177E+01
 EBVshrink(%):   3.3162E+00  1.9861E+01  2.4449E+01  1.5063E+01
 EPSshrink(%):   3.0941E+01

 #TERE:
 Elapsed estimation time in seconds:     6.24
 Elapsed covariance time in seconds:     5.84

 ********************          FIRST ORDER CONDITIONAL ESTIMATION WITH INTERACTION (NO PRIOR)        ********************
 #OBJT:**************                       MINIMUM VALUE OF OBJECTIVE FUNCTION                      ********************
 #OBJV:********************************************    -1121.028       **************************************************

 ********************          FIRST ORDER CONDITIONAL ESTIMATION WITH INTERACTION (NO PRIOR)        ********************
 ********************                             FINAL PARAMETER ESTIMATE                           ********************

 THETA - VECTOR OF FIXED EFFECTS PARAMETERS   *********
         TH 1      TH 2      TH 3      TH 4
         1.69E+00  1.61E+00  8.20E-01  2.39E+00

 OMEGA - COV MATRIX FOR RANDOM EFFECTS - ETAS  ********
            ETA1      ETA2      ETA3      ETA4
 ETA1
+        1.65E-01
 ETA2
+       -7.42E-04  1.31E-01
 ETA3
+        1.24E-02  1.60E-02  1.88E-01
 ETA4
+       -1.27E-02  1.39E-02  3.33E-02  1.50E-01

 SIGMA - COV MATRIX FOR RANDOM EFFECTS - EPSILONS  ****
            EPS1
 EPS1
+        5.72E-02

 OMEGA - CORR MATRIX FOR RANDOM EFFECTS - ETAS  *******
            ETA1      ETA2      ETA3      ETA4
 ETA1
+        4.06E-01
 ETA2
+       -5.04E-03  3.63E-01
 ETA3
+        7.05E-02  1.02E-01  4.33E-01
 ETA4
+       -8.10E-02  9.91E-02  1.98E-01  3.87E-01

 SIGMA - CORR MATRIX FOR RANDOM EFFECTS - EPSILONS  ***
            EPS1
 EPS1
+        2.39E-01

 ********************          FIRST ORDER CONDITIONAL ESTIMATION WITH INTERACTION (NO PRIOR)        ********************
 ********************                            STANDARD ERROR OF ESTIMATE                          ********************

 THETA - VECTOR OF FIXED EFFECTS PARAMETERS   *********
         TH 1      TH 2      TH 3      TH 4
         4.32E-02  4.76E-02  7.00E-02  5.16E-02

 OMEGA - COV MATRIX FOR RANDOM EFFECTS - ETAS  ********
            ETA1      ETA2      ETA3      ETA4
 ETA1
+        2.72E-02
 ETA2
+        2.08E-02  3.13E-02
 ETA3
+        2.99E-02  3.57E-02  7.19E-02
 ETA4
+        2.36E-02  2.41E-02  4.26E-02  3.82E-02

 SIGMA - COV MATRIX FOR RANDOM EFFECTS - EPSILONS  ****
            EPS1
 EPS1
+        7.57E-03

 OMEGA - CORR MATRIX FOR RANDOM EFFECTS - ETAS  *******
            ETA1      ETA2      ETA3      ETA4
 ETA1
+        3.35E-02
 ETA2
+        1.41E-01  4.32E-02
 ETA3
+        1.63E-01  2.27E-01  8.30E-02
 ETA4
+        1.55E-01  1.66E-01  2.08E-01  4.94E-02

 SIGMA - CORR MATRIX FOR RANDOM EFFECTS - EPSILONS  ***
            EPS1
 EPS1
+        1.58E-02

 ********************          FIRST ORDER CONDITIONAL ESTIMATION WITH INTERACTION (NO PRIOR)        ********************
 ********************                          COVARIANCE MATRIX OF ESTIMATE                         ********************

            TH 1      TH 2      TH 3      TH 4      OM11      OM12      OM13      OM14      OM22      OM23      OM24      OM33
             OM34      OM44      SG11
 TH 1
+        1.86E-03
 TH 2
+        2.37E-04  2.27E-03
 TH 3
+        5.70E-04  2.05E-04  4.90E-03
 TH 4
+        2.35E-04  3.09E-04  1.94E-03  2.66E-03
 OM11
+        6.71E-05  1.37E-04  2.16E-04  1.65E-04  7.39E-04
 OM12
+        8.01E-05  1.34E-04  2.52E-04  1.59E-04  1.21E-04  4.33E-04
 OM13
+        1.02E-04  1.91E-04  6.69E-05  2.11E-04  2.72E-04  1.16E-04  8.94E-04
 OM14
+        8.64E-05  1.34E-04  2.56E-04  2.12E-04  1.47E-04  1.14E-04  4.07E-04  5.56E-04
 OM22
+       -1.36E-05  4.21E-05 -2.12E-04 -6.99E-05  2.13E-05  5.67E-05  8.32E-05  5.37E-05  9.80E-04
 OM23
+        4.47E-05  8.44E-05  8.43E-04  2.58E-04  9.49E-05  1.81E-04  6.92E-06  7.34E-05  1.71E-05  1.28E-03
 OM24
+        2.17E-05 -1.73E-05  3.34E-04  1.89E-04  5.30E-05  4.52E-05  7.11E-05  1.16E-04  1.63E-04  3.75E-04  5.79E-04
 OM33
+        2.25E-04  3.69E-05  1.01E-03  6.73E-04  3.23E-04  1.51E-04  9.03E-04  5.53E-04  2.56E-04  2.68E-04  3.12E-04  5.17E-03
 OM34
+        1.38E-04  7.94E-05  4.14E-04  2.99E-04  1.83E-04  9.04E-05  4.76E-04  3.81E-04  1.87E-04  1.32E-04  2.61E-04  2.41E-03
          1.81E-03
 OM44
+        8.99E-05  1.46E-04  1.80E-04  2.19E-04  1.33E-04  6.56E-05  2.93E-04  2.52E-04  1.77E-04  1.08E-04  2.86E-04  1.22E-03
          1.13E-03  1.46E-03
 SG11
+        1.38E-05  6.39E-06 -3.66E-05 -1.83E-05 -3.67E-05 -6.56E-06 -6.16E-05 -4.91E-05 -6.55E-05 -4.16E-05 -4.64E-05 -2.53E-04
         -1.52E-04 -1.16E-04  5.73E-05

 ********************          FIRST ORDER CONDITIONAL ESTIMATION WITH INTERACTION (NO PRIOR)        ********************
 ********************                          CORRELATION MATRIX OF ESTIMATE                        ********************

            TH 1      TH 2      TH 3      TH 4      OM11      OM12      OM13      OM14      OM22      OM23      OM24      OM33
             OM34      OM44      SG11
 TH 1
+        4.32E-02
 TH 2
+        1.15E-01  4.76E-02
 TH 3
+        1.89E-01  6.15E-02  7.00E-02
 TH 4
+        1.06E-01  1.26E-01  5.37E-01  5.16E-02
 OM11
+        5.72E-02  1.06E-01  1.13E-01  1.18E-01  2.72E-02
 OM12
+        8.91E-02  1.35E-01  1.73E-01  1.48E-01  2.14E-01  2.08E-02
 OM13
+        7.93E-02  1.34E-01  3.20E-02  1.37E-01  3.34E-01  1.87E-01  2.99E-02
 OM14
+        8.48E-02  1.19E-01  1.55E-01  1.74E-01  2.30E-01  2.32E-01  5.77E-01  2.36E-02
 OM22
+       -1.01E-02  2.82E-02 -9.68E-02 -4.33E-02  2.50E-02  8.71E-02  8.88E-02  7.27E-02  3.13E-02
 OM23
+        2.90E-02  4.96E-02  3.37E-01  1.40E-01  9.78E-02  2.43E-01  6.48E-03  8.71E-02  1.53E-02  3.57E-02
 OM24
+        2.09E-02 -1.51E-02  1.99E-01  1.52E-01  8.10E-02  9.03E-02  9.88E-02  2.04E-01  2.16E-01  4.36E-01  2.41E-02
 OM33
+        7.26E-02  1.08E-02  2.01E-01  1.81E-01  1.65E-01  1.01E-01  4.20E-01  3.26E-01  1.14E-01  1.04E-01  1.80E-01  7.19E-02
 OM34
+        7.49E-02  3.92E-02  1.39E-01  1.36E-01  1.58E-01  1.02E-01  3.74E-01  3.79E-01  1.40E-01  8.70E-02  2.54E-01  7.87E-01
          4.26E-02
 OM44
+        5.44E-02  8.01E-02  6.74E-02  1.11E-01  1.28E-01  8.25E-02  2.57E-01  2.80E-01  1.48E-01  7.93E-02  3.11E-01  4.44E-01
          6.93E-01  3.82E-02
 SG11
+        4.23E-02  1.77E-02 -6.91E-02 -4.67E-02 -1.78E-01 -4.17E-02 -2.72E-01 -2.75E-01 -2.76E-01 -1.54E-01 -2.55E-01 -4.64E-01
         -4.72E-01 -4.00E-01  7.57E-03
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
 ********************          FIRST ORDER CONDITIONAL ESTIMATION WITH INTERACTION (NO PRIOR)        ********************
 ********************                      EIGENVALUES OF COR MATRIX OF ESTIMATE                     ********************

             1         2         3         4         5         6         7         8         9        10        11        12
             13        14        15
         1.39E-01  3.43E-01  4.00E-01  4.36E-01  5.22E-01  6.52E-01  7.84E-01  7.98E-01  8.56E-01  8.79E-01  1.01E+00  1.21E+00
          1.43E+00  1.80E+00  3.73E+00
 #CPUT: Total CPU Time in Seconds,      219.088
