Wed 10/28/2015
05:13 PM
;Model Desc: Two Compartment model with Clearance and central volume modeled with covariates age and gender
;Project Name: nm7examples
;Project ID: NO PROJECT DESCRIPTION
$PROBLEM    RUN# example2 (from sampc)
;; 1. Based on:0

;; 2. Description:

;;    Covariate Model CL and V with Gender and Age

;; 3. Label:

;;    2CMT

;; 4. Structural model:

;;    ADVAN3 TRANS4

;; 5. Covariate model:

;;    None

;; 6. Inter-individual variability:

;;    CL, V1, Q, V2

;; 7. Inter-occasion variability:

;;    None

;; 8. Residual variability:

;;    proportional

;; 9. Estimation:

;;    FOCE INTER, SAEM, BAYES, IMP
$INPUT      C SET ID JID TIME DV=CONC AMT=DOSE RATE EVID MDV CMT GNDR
            AGE
$DATA       example2.csv IGNORE=C
$SUBROUTINE ADVAN3 TRANS4
;NTHETA=number of Thetas to be estimated

;NETA=number of Etas to be estimated (and to be described by NETAxNETA OMEGA matrix)

;NTHP=number of thetas which have a prior

;NETP=number of Omegas with prior

;Prior information is important for MCMC Bayesian analysis, not necessary for maximization

; methods

; In this example, only the OMEGAs have a prior distribution, the THETAS do not.

; For Bayesian methods, it is most important for at least the OMEGAs to have a prior,

; even an uninformative one, to stabilize the analysis. Only if the number of subjects

; exceeds the OMEGA dimension number by at least 100, then you may get away without

; priors on OMEGA for BAYES analysis.
$PRIOR      NWPRI NTHETA=11,NETA=4,NTHP=0,NETP=4,NPEXP=1
$PK
; LCLM=log transformed clearance, male
LCLM=THETA(1)
;LCLF=log transformed clearance, female.
LCLF=THETA(2)
; CLAM=CL age slope, male
CLAM=THETA(3)
; CLAF=CL age slope, female
CLAF=THETA(4)
; LV1M=log transformed V1, male
LV1M=THETA(5)
; LV1F=log transformed V1, female
LV1F=THETA(6)
; V1AM=V1 age slope, male
V1AM=THETA(7)
; V1AF=V1 age slope, female
V1AF=THETA(8)
; LAGE=log transformed age
LAGE=DLOG(AGE)
;Mean of ETA1, the inter-subject deviation of Clearance, is ultimately modeled as linear function
;of THETA(1) to THETA(4).  Relating thetas to Mus by linear functions is not essential for ITS,
;IMP, or IMPMAP methods, but is very helpful for MCMC methods such as SAEM and BAYES.
MU_1=(1.0-GNDR)*(LCLM+LAGE*CLAM) + GNDR*(LCLF+LAGE*CLAF)
;Mean of ETA2, the inter-subject deviation of V1, is ultimately modeled as linear function of
; THETA(5) to THETA(8)
MU_2=(1.0-GNDR)*(LV1M+LAGE*V1AM) + GNDR*(LV1F+LAGE*V1AF)
MU_3=THETA(9)
MU_4=THETA(10)
CL=DEXP(MU_1+ETA(1))
V1=DEXP(MU_2+ETA(2))
Q=DEXP(MU_3+ETA(3))
V2=DEXP(MU_4+ETA(4))
S1=V1

STRT = 0
IF(ID.GT.200) STRT = 1

$ERROR
CALLFL=0
; Option to model the residual error coefficient in THETA(11), rather than in SIGMA.
SDSL=THETA(11)
W=F*SDSL
Y = F + W*EPS(1)
IPRED=F
IWRES=(DV-F)/W

;Initial THETAs
$THETA  0.7 ; [LCLM]
 0.7 ; [LCLF]
 2 ; [CLAM]
 2.0 ; [CLAF]
 0.7 ; [LV1M]
 0.7 ; [LV1F]
 2.0 ; [V1AM]
 2.0 ; [V1AF]
 0.7 ; [MU_3]
 0.7 ; [MU_4]
 0.3 ; [SDSL]
;Initial OMEGAs
$THETA  4 FIX
; Prior OMEGA matrix
$OMEGA  BLOCK(4)
 0.5  ;        [p]
 0.001  ;        [f]
 0.5  ;       [p]_
 0.001  ;       [f]_
 0.001  ;       [f]_
 0.5  ;       [p]_
 0.001  ;       [f]_
 0.001  ;       [f]_
 0.001  ;       [f]_
 0.5  ;       [p]_
; Degrees of freedom to OMEGA prior matrix:
$OMEGA  BLOCK(4) FIX
 0.01
 0.0 0.01
 0.0 0.0 0.01
 0.0 0.0 0.0 0.01
;SIGMA is 1.0 fixed, serves as unscaled variance for EPS(1).  THETA(11) takes up the
; residual error scaling.
$SIGMA  1.0  FIX
; The first analysis is iterative two-stage.  Note that the GRD specification is THETA(11) is a
; Sigma-like parameter.  This will allow NONMEM to
; make efficient gradient evaluations for THETA(11), which is useful for later IMP,IMPMAP, and
; SAEM methods, but has no impact on ITS and BAYES methods.
$ESTIMATION METHOD=ITS INTERACTION FILE=psn.ext NITER=300 NSIG=2
            PRINT=5 NOABORT SIGL=8 NOPRIOR=1 CTYPE=3 GRD=TS(11)
; Results of ITS serve as initial parameters for the IMP method.
$ESTIMATION METHOD=IMP INTERACTION EONLY=0 MAPITER=0 NITER=50
            ISAMPLE=300 PRINT=1 SIGL=8
; The results of IMP are used as the initial values for the SAEM method.
$ESTIMATION METHOD=SAEM NBURN=3000 NITER=2000 PRINT=10 ISAMPLE=2
            ISAMPLE=1 ISAMPLE_M1=1 ISAMPLE_M2=1 ISAMPLE_M3=1 CTYPE=3
            CITER=10 CALPHA=0.05
; After the SAEM method, obtain good estimates of the marginal density (objective function),

; along with good estimates of the standard errors.
$ESTIMATION METHOD=IMP INTERACTION EONLY=1 NITER=5 ISAMPLE=3000
            PRINT=1 SIGL=8 SEED=123334 CTYPE=3 CITER=10 CALPHA=0.05
; The Bayesian analysis is performed.
$ESTIMATION METHOD=BAYES INTERACTION NBURN=10000 NITER=1000 PRINT=100
            NOPRIOR=0 CTYPE=3 CITER=10 CALPHA=0.05
; Just for old-times sake, lets see what the traditional FOCE method will give us.

; And, remember to introduce a new FILE, so its results wont append to our Bayesian FILE.
$ESTIMATION METHOD=COND INTERACTION MAXEVAL=9999 NSIG=2 SIGL=14
            PRINT=5 NOABORT NOPRIOR=1 FILE=psn.ext
$COVARIANCE MATRIX=R UNCONDITIONAL PRINT=E
$TABLE      ID TIME DV IPRED PRED RES WRES CPRED CWRES EPRED ERES
            EWRES EVID NOAPPEND ONEHEADER FILE=example2.sdtab NOPRINT
$TABLE      ID CL V1 Q V2 ETA1 ETA2 ETA3 ETA4 NOAPPEND ONEHEADER
            NOPRINT FILE=example2.patab
$TABLE      ID AGE GNDR NOAPPEND ONEHEADER NOPRINT FILE=example2.catab

NM-TRAN MESSAGES
 WARNINGS AND ERRORS (IF ANY) FOR PROBLEM    1
 (WARNING  2) NM-TRAN INFERS THAT THE DATA ARE POPULATION.
 (MU_WARNING 26) DATA ITEM(S) USED IN DEFINITION OF MU_(S) SHOULD BE CONSTANT FOR INDIV. REC.:
  GNDR AGE

1NONLINEAR MIXED EFFECTS MODEL PROGRAM (NONMEM) VERSION 7.3.0
 ORIGINALLY DEVELOPED BY STUART BEAL, LEWIS SHEINER, AND ALISON BOECKMANN
 CURRENT DEVELOPERS ARE ROBERT BAUER, ICON DEVELOPMENT SOLUTIONS,
 AND ALISON BOECKMANN. IMPLEMENTATION, EFFICIENCY, AND STANDARDIZATION
 PERFORMED BY NOUS INFOSYSTEMS.
 PROBLEM NO.:         1
 RUN# example2 (from sampc)
 TOT. NO. OF OBS RECS:     2000
 TOT. NO. OF INDIVIDUALS:    400
 TWO COMPARTMENT MODEL (ADVAN3)
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 #TBLN:      1
 #METH: Iterative Two Stage (No Prior)
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
 #TERM:
 OPTIMIZATION WAS COMPLETED

 ETABAR IS THE ARITHMETIC MEAN OF THE ETA-ESTIMATES,
 AND THE P-VALUE IS GIVEN FOR THE NULL HYPOTHESIS THAT THE TRUE MEAN IS 0.

 ETABAR:        -3.8553E-08 -5.2131E-08 -9.7314E-08 -8.8724E-08
 SE:             4.7132E-03  2.9883E-03  2.9421E-03  3.6914E-03
 N:                     400         400         400         400

 P VAL.:         9.9999E-01  9.9999E-01  9.9997E-01  9.9998E-01

 ETAshrink(%):   6.9152E+00  3.2911E+01  4.1052E+01  2.5073E+01
 EBVshrink(%):   6.9151E+00  3.2911E+01  4.1050E+01  2.5072E+01
 EPSshrink(%):   2.6187E+01

 #TERE:
 Elapsed estimation time in seconds:   145.70
 Elapsed covariance time in seconds:     0.59

 ********************                          ITERATIVE TWO STAGE (NO PRIOR)                        ********************
 #OBJT:**************                        FINAL VALUE OF OBJECTIVE FUNCTION                       ********************
 #OBJV:********************************************   -10771.858       **************************************************

 ********************                          ITERATIVE TWO STAGE (NO PRIOR)                        ********************
 ********************                             FINAL PARAMETER ESTIMATE                           ********************

 THETA - VECTOR OF FIXED EFFECTS PARAMETERS   *********
         TH 1      TH 2      TH 3      TH 4      TH 5      TH 6      TH 7      TH 8      TH 9      TH10      TH11
         3.30E+00  3.26E+00 -6.11E-01 -2.08E-01  7.29E-01  1.14E+00  3.37E-01  1.92E-01  6.92E-01  2.30E+00  9.99E-02

 OMEGA - COV MATRIX FOR RANDOM EFFECTS - ETAS  ********
            ETA1      ETA2      ETA3      ETA4
 ETA1
+        1.03E-02
 ETA2
+        1.66E-04  7.96E-03
 ETA3
+        1.20E-03 -3.61E-04  9.99E-03
 ETA4
+       -6.31E-04  4.54E-04  2.02E-03  9.73E-03

 SIGMA - COV MATRIX FOR RANDOM EFFECTS - EPSILONS  ****
            EPS1
 EPS1
+        1.00E+00

 OMEGA - CORR MATRIX FOR RANDOM EFFECTS - ETAS  *******
            ETA1      ETA2      ETA3      ETA4
 ETA1
+        1.01E-01
 ETA2
+        1.83E-02  8.92E-02
 ETA3
+        1.18E-01 -4.04E-02  9.99E-02
 ETA4
+       -6.31E-02  5.16E-02  2.05E-01  9.87E-02

 SIGMA - CORR MATRIX FOR RANDOM EFFECTS - EPSILONS  ***
            EPS1
 EPS1
+        1.00E+00

 ********************                          ITERATIVE TWO STAGE (NO PRIOR)                        ********************
 ********************                          STANDARD ERROR OF ESTIMATE (S)                        ********************

 THETA - VECTOR OF FIXED EFFECTS PARAMETERS   *********
         TH 1      TH 2      TH 3      TH 4      TH 5      TH 6      TH 7      TH 8      TH 9      TH10      TH11
         3.80E-02  2.88E-02  1.11E-02  8.42E-03  4.84E-02  4.10E-02  1.34E-02  1.19E-02  1.05E-02  8.94E-03  2.98E-03

 OMEGA - COV MATRIX FOR RANDOM EFFECTS - ETAS  ********
            ETA1      ETA2      ETA3      ETA4
 ETA1
+        1.01E-03
 ETA2
+        8.65E-04  1.50E-03
 ETA3
+        1.29E-03  1.44E-03  2.83E-03
 ETA4
+        1.12E-03  1.16E-03  1.98E-03  2.00E-03

 SIGMA - COV MATRIX FOR RANDOM EFFECTS - EPSILONS  ****
            EPS1
 EPS1
+        0.00E+00

 OMEGA - CORR MATRIX FOR RANDOM EFFECTS - ETAS  *******
            ETA1      ETA2      ETA3      ETA4
 ETA1
+        4.96E-03
 ETA2
+        9.47E-02  8.39E-03
 ETA3
+        1.20E-01  1.65E-01  1.41E-02
 ETA4
+        1.16E-01  1.28E-01  1.62E-01  1.01E-02

 SIGMA - CORR MATRIX FOR RANDOM EFFECTS - EPSILONS  ***
            EPS1
 EPS1
+       .........
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
 ********************                          ITERATIVE TWO STAGE (NO PRIOR)                        ********************
 ********************                    EIGENVALUES OF COR MATRIX OF ESTIMATE (S)                   ********************

             1         2         3         4         5         6         7         8         9        10        11        12
             13        14        15        16        17        18        19        20        21
         1.76E-02  2.24E-02  2.35E-02  4.30E-02  6.76E-02  1.94E-01  2.50E-01  2.84E-01  4.55E-01  5.57E-01  6.73E-01  6.97E-01
          1.04E+00  1.10E+00  1.28E+00  1.53E+00  1.67E+00  1.73E+00  2.40E+00  2.72E+00  4.24E+00
 #TBLN:      2
 #METH: Importance Sampling (No Prior)
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
 #TERM:
 OPTIMIZATION WAS COMPLETED

 ETABAR IS THE ARITHMETIC MEAN OF THE ETA-ESTIMATES,
 AND THE P-VALUE IS GIVEN FOR THE NULL HYPOTHESIS THAT THE TRUE MEAN IS 0.

 ETABAR:         3.7991E-05  2.4355E-04 -1.4225E-04 -4.1250E-06
 SE:             4.7119E-03  2.9825E-03  2.8915E-03  3.6630E-03
 N:                     400         400         400         400

 P VAL.:         9.9357E-01  9.3492E-01  9.6076E-01  9.9910E-01

 ETAshrink(%):   6.9484E+00  3.3416E+01  4.1326E+01  2.5387E+01
 EBVshrink(%):   7.0355E+00  3.3067E+01  4.1592E+01  2.5147E+01
 EPSshrink(%):   2.6368E+01

 #TERE:
 Elapsed estimation time in seconds:   491.19
 Elapsed covariance time in seconds:    33.32

 ********************                          IMPORTANCE SAMPLING (NO PRIOR)                        ********************
 #OBJT:**************                        FINAL VALUE OF OBJECTIVE FUNCTION                       ********************
 #OBJV:********************************************   -10783.923       **************************************************

 ********************                          IMPORTANCE SAMPLING (NO PRIOR)                        ********************
 ********************                             FINAL PARAMETER ESTIMATE                           ********************

 THETA - VECTOR OF FIXED EFFECTS PARAMETERS   *********
         TH 1      TH 2      TH 3      TH 4      TH 5      TH 6      TH 7      TH 8      TH 9      TH10      TH11
         3.30E+00  3.25E+00 -6.12E-01 -2.08E-01  7.34E-01  1.14E+00  3.35E-01  1.91E-01  6.90E-01  2.30E+00  1.00E-01

 OMEGA - COV MATRIX FOR RANDOM EFFECTS - ETAS  ********
            ETA1      ETA2      ETA3      ETA4
 ETA1
+        1.03E-02
 ETA2
+        1.86E-04  8.05E-03
 ETA3
+        1.25E-03 -8.21E-05  9.74E-03
 ETA4
+       -6.47E-04  5.09E-04  1.85E-03  9.66E-03

 SIGMA - COV MATRIX FOR RANDOM EFFECTS - EPSILONS  ****
            EPS1
 EPS1
+        1.00E+00

 OMEGA - CORR MATRIX FOR RANDOM EFFECTS - ETAS  *******
            ETA1      ETA2      ETA3      ETA4
 ETA1
+        1.01E-01
 ETA2
+        2.05E-02  8.97E-02
 ETA3
+        1.25E-01 -9.28E-03  9.87E-02
 ETA4
+       -6.49E-02  5.78E-02  1.91E-01  9.83E-02

 SIGMA - CORR MATRIX FOR RANDOM EFFECTS - EPSILONS  ***
            EPS1
 EPS1
+        1.00E+00

 ********************                          IMPORTANCE SAMPLING (NO PRIOR)                        ********************
 ********************                          STANDARD ERROR OF ESTIMATE (R)                        ********************

 THETA - VECTOR OF FIXED EFFECTS PARAMETERS   *********
         TH 1      TH 2      TH 3      TH 4      TH 5      TH 6      TH 7      TH 8      TH 9      TH10      TH11
         3.27E-02  2.86E-02  9.53E-03  8.31E-03  3.92E-02  3.56E-02  1.13E-02  1.03E-02  1.04E-02  8.52E-03  2.87E-03

 OMEGA - COV MATRIX FOR RANDOM EFFECTS - ETAS  ********
            ETA1      ETA2      ETA3      ETA4
 ETA1
+        9.80E-04
 ETA2
+        8.24E-04  1.32E-03
 ETA3
+        1.37E-03  1.41E-03  3.26E-03
 ETA4
+        1.06E-03  1.09E-03  2.30E-03  2.01E-03

 SIGMA - COV MATRIX FOR RANDOM EFFECTS - EPSILONS  ****
            EPS1
 EPS1
+        0.00E+00

 OMEGA - CORR MATRIX FOR RANDOM EFFECTS - ETAS  *******
            ETA1      ETA2      ETA3      ETA4
 ETA1
+        4.83E-03
 ETA2
+        8.98E-02  7.38E-03
 ETA3
+        1.23E-01  1.60E-01  1.65E-02
 ETA4
+        1.10E-01  1.21E-01  1.93E-01  1.02E-02

 SIGMA - CORR MATRIX FOR RANDOM EFFECTS - EPSILONS  ***
            EPS1
 EPS1
+       .........
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
 ********************                          IMPORTANCE SAMPLING (NO PRIOR)                        ********************
 ********************                    EIGENVALUES OF COR MATRIX OF ESTIMATE (R)                   ********************

             1         2         3         4         5         6         7         8         9        10        11        12
             13        14        15        16        17        18        19        20        21
         2.60E-02  2.79E-02  3.53E-02  4.46E-02  5.33E-02  1.87E-01  2.66E-01  3.05E-01  4.91E-01  5.58E-01  5.88E-01  6.62E-01
          1.12E+00  1.23E+00  1.34E+00  1.50E+00  1.55E+00  1.64E+00  2.39E+00  2.73E+00  4.25E+00
 #TBLN:      3
 #METH: Stochastic Approximation Expectation-Maximization (No Prior)
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
 #TERM:
 STOCHASTIC PORTION WAS COMPLETED
 REDUCED STOCHASTIC PORTION WAS COMPLETED

 ETABAR IS THE ARITHMETIC MEAN OF THE ETA-ESTIMATES,
 AND THE P-VALUE IS GIVEN FOR THE NULL HYPOTHESIS THAT THE TRUE MEAN IS 0.

 ETABAR:        -7.6669E-07 -9.5516E-07  2.3507E-06 -2.4441E-07
 SE:             4.6331E-03  2.8431E-03  2.5678E-03  3.5595E-03
 N:                     400         400         400         400

 P VAL.:         9.9987E-01  9.9973E-01  9.9927E-01  9.9995E-01

 ETAshrink(%):   5.9919E+00  3.2963E+01  3.5102E+01  1.8350E+01
 EBVshrink(%):   5.9928E+00  3.2960E+01  3.5103E+01  1.8350E+01
 EPSshrink(%):   2.4818E+01

 #TERE:
 Elapsed estimation time in seconds:   469.25
 Elapsed covariance time in seconds:     0.58

 ********************           STOCHASTIC APPROXIMATION EXPECTATION-MAXIMIZATION (NO PRIOR)         ********************
 #OBJT:**************                        FINAL VALUE OF LIKELIHOOD FUNCTION                      ********************
 #OBJV:********************************************   -19993.879       **************************************************

 ********************           STOCHASTIC APPROXIMATION EXPECTATION-MAXIMIZATION (NO PRIOR)         ********************
 ********************                             FINAL PARAMETER ESTIMATE                           ********************

 THETA - VECTOR OF FIXED EFFECTS PARAMETERS   *********
         TH 1      TH 2      TH 3      TH 4      TH 5      TH 6      TH 7      TH 8      TH 9      TH10      TH11
         3.31E+00  3.25E+00 -6.14E-01 -2.08E-01  7.52E-01  1.14E+00  3.31E-01  1.93E-01  6.99E-01  2.31E+00  1.03E-01

 OMEGA - COV MATRIX FOR RANDOM EFFECTS - ETAS  ********
            ETA1      ETA2      ETA3      ETA4
 ETA1
+        9.74E-03
 ETA2
+       -3.00E-04  7.21E-03
 ETA3
+       -5.37E-04 -2.50E-03  6.28E-03
 ETA4
+       -1.90E-03 -9.74E-04 -8.73E-04  7.62E-03

 SIGMA - COV MATRIX FOR RANDOM EFFECTS - EPSILONS  ****
            EPS1
 EPS1
+        1.00E+00

 OMEGA - CORR MATRIX FOR RANDOM EFFECTS - ETAS  *******
            ETA1      ETA2      ETA3      ETA4
 ETA1
+        9.87E-02
 ETA2
+       -3.58E-02  8.49E-02
 ETA3
+       -6.87E-02 -3.72E-01  7.92E-02
 ETA4
+       -2.21E-01 -1.31E-01 -1.26E-01  8.73E-02

 SIGMA - CORR MATRIX FOR RANDOM EFFECTS - EPSILONS  ***
            EPS1
 EPS1
+        1.00E+00

 ********************           STOCHASTIC APPROXIMATION EXPECTATION-MAXIMIZATION (NO PRIOR)         ********************
 ********************                          STANDARD ERROR OF ESTIMATE (S)                        ********************

 THETA - VECTOR OF FIXED EFFECTS PARAMETERS   *********
         TH 1      TH 2      TH 3      TH 4      TH 5      TH 6      TH 7      TH 8      TH 9      TH10      TH11
         3.78E-02  2.94E-02  1.10E-02  8.57E-03  4.83E-02  4.23E-02  1.33E-02  1.22E-02  9.46E-03  8.22E-03  2.95E-03

 OMEGA - COV MATRIX FOR RANDOM EFFECTS - ETAS  ********
            ETA1      ETA2      ETA3      ETA4
 ETA1
+        9.08E-04
 ETA2
+        7.76E-04  1.37E-03
 ETA3
+        1.03E-03  1.20E-03  2.05E-03
 ETA4
+        9.23E-04  9.41E-04  1.32E-03  1.50E-03

 SIGMA - COV MATRIX FOR RANDOM EFFECTS - EPSILONS  ****
            EPS1
 EPS1
+        0.00E+00

 OMEGA - CORR MATRIX FOR RANDOM EFFECTS - ETAS  *******
            ETA1      ETA2      ETA3      ETA4
 ETA1
+        4.60E-03
 ETA2
+        9.40E-02  8.06E-03
 ETA3
+        1.33E-01  1.95E-01  1.29E-02
 ETA4
+        1.17E-01  1.31E-01  2.12E-01  8.62E-03

 SIGMA - CORR MATRIX FOR RANDOM EFFECTS - EPSILONS  ***
            EPS1
 EPS1
+       .........
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
 ********************           STOCHASTIC APPROXIMATION EXPECTATION-MAXIMIZATION (NO PRIOR)         ********************
 ********************                    EIGENVALUES OF COR MATRIX OF ESTIMATE (S)                   ********************

             1         2         3         4         5         6         7         8         9        10        11        12
             13        14        15        16        17        18        19        20        21
         1.70E-02  2.14E-02  2.29E-02  4.37E-02  1.38E-01  2.93E-01  3.71E-01  4.44E-01  5.58E-01  6.62E-01  8.41E-01  9.18E-01
          1.13E+00  1.18E+00  1.26E+00  1.56E+00  1.74E+00  1.93E+00  2.41E+00  2.56E+00  2.91E+00
 #TBLN:      4
 #METH: Objective Function Evaluation by Importance Sampling (No Prior)
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
 #TERM:
 EXPECTATION ONLY PROCESS COMPLETED

 ETABAR IS THE ARITHMETIC MEAN OF THE ETA-ESTIMATES,
 AND THE P-VALUE IS GIVEN FOR THE NULL HYPOTHESIS THAT THE TRUE MEAN IS 0.

 ETABAR:        -1.4306E-04 -2.5266E-04 -7.9841E-04 -5.5940E-04
 SE:             4.6300E-03  2.8409E-03  2.5373E-03  3.5444E-03
 N:                     400         400         400         400

 P VAL.:         9.7535E-01  9.2913E-01  7.5301E-01  8.7460E-01

 ETAshrink(%):   6.0538E+00  3.3014E+01  3.5873E+01  1.8696E+01
 EBVshrink(%):   6.0057E+00  3.2741E+01  3.5165E+01  1.8546E+01
 EPSshrink(%):   2.4858E+01

 #TERE:
 Elapsed estimation time in seconds:   220.32
 Elapsed covariance time in seconds:   322.78

 ********************         OBJECTIVE FUNCTION EVALUATION BY IMPORTANCE SAMPLING (NO PRIOR)        ********************
 #OBJT:**************                        FINAL VALUE OF OBJECTIVE FUNCTION                       ********************
 #OBJV:********************************************   -10777.680       **************************************************

 ********************         OBJECTIVE FUNCTION EVALUATION BY IMPORTANCE SAMPLING (NO PRIOR)        ********************
 ********************                             FINAL PARAMETER ESTIMATE                           ********************

 THETA - VECTOR OF FIXED EFFECTS PARAMETERS   *********
         TH 1      TH 2      TH 3      TH 4      TH 5      TH 6      TH 7      TH 8      TH 9      TH10      TH11
         3.31E+00  3.25E+00 -6.14E-01 -2.08E-01  7.52E-01  1.14E+00  3.31E-01  1.93E-01  6.99E-01  2.31E+00  1.03E-01

 OMEGA - COV MATRIX FOR RANDOM EFFECTS - ETAS  ********
            ETA1      ETA2      ETA3      ETA4
 ETA1
+        9.74E-03
 ETA2
+       -3.00E-04  7.21E-03
 ETA3
+       -5.37E-04 -2.50E-03  6.28E-03
 ETA4
+       -1.90E-03 -9.74E-04 -8.73E-04  7.62E-03

 SIGMA - COV MATRIX FOR RANDOM EFFECTS - EPSILONS  ****
            EPS1
 EPS1
+        1.00E+00

 OMEGA - CORR MATRIX FOR RANDOM EFFECTS - ETAS  *******
            ETA1      ETA2      ETA3      ETA4
 ETA1
+        9.87E-02
 ETA2
+       -3.58E-02  8.49E-02
 ETA3
+       -6.87E-02 -3.72E-01  7.92E-02
 ETA4
+       -2.21E-01 -1.31E-01 -1.26E-01  8.73E-02

 SIGMA - CORR MATRIX FOR RANDOM EFFECTS - EPSILONS  ***
            EPS1
 EPS1
+        1.00E+00

 ********************         OBJECTIVE FUNCTION EVALUATION BY IMPORTANCE SAMPLING (NO PRIOR)        ********************
 ********************                          STANDARD ERROR OF ESTIMATE (R)                        ********************

 THETA - VECTOR OF FIXED EFFECTS PARAMETERS   *********
         TH 1      TH 2      TH 3      TH 4      TH 5      TH 6      TH 7      TH 8      TH 9      TH10      TH11
         3.27E-02  2.90E-02  9.53E-03  8.41E-03  3.92E-02  3.63E-02  1.13E-02  1.05E-02  1.02E-02  8.37E-03  3.10E-03

 OMEGA - COV MATRIX FOR RANDOM EFFECTS - ETAS  ********
            ETA1      ETA2      ETA3      ETA4
 ETA1
+        9.08E-04
 ETA2
+        7.74E-04  1.30E-03
 ETA3
+        1.18E-03  1.37E-03  2.87E-03
 ETA4
+        9.07E-04  9.96E-04  1.98E-03  1.73E-03

 SIGMA - COV MATRIX FOR RANDOM EFFECTS - EPSILONS  ****
            EPS1
 EPS1
+        0.00E+00

 OMEGA - CORR MATRIX FOR RANDOM EFFECTS - ETAS  *******
            ETA1      ETA2      ETA3      ETA4
 ETA1
+        4.60E-03
 ETA2
+        9.37E-02  7.64E-03
 ETA3
+        1.59E-01  2.46E-01  1.81E-02
 ETA4
+        1.18E-01  1.39E-01  3.22E-01  9.92E-03

 SIGMA - CORR MATRIX FOR RANDOM EFFECTS - EPSILONS  ***
            EPS1
 EPS1
+       .........
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
 ********************         OBJECTIVE FUNCTION EVALUATION BY IMPORTANCE SAMPLING (NO PRIOR)        ********************
 ********************                    EIGENVALUES OF COR MATRIX OF ESTIMATE (R)                   ********************

             1         2         3         4         5         6         7         8         9        10        11        12
             13        14        15        16        17        18        19        20        21
         2.56E-02  2.69E-02  3.36E-02  4.51E-02  7.17E-02  2.44E-01  3.20E-01  3.53E-01  4.62E-01  5.83E-01  6.21E-01  8.34E-01
          1.19E+00  1.25E+00  1.33E+00  1.47E+00  1.49E+00  1.62E+00  2.44E+00  2.72E+00  3.88E+00
 #TBLN:      5
 #METH: MCMC Bayesian Analysis
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
 #TERM:
 BURN-IN WAS COMPLETED
 STATISTICAL PORTION WAS COMPLETED

 #TERE:
 Elapsed estimation time in seconds:   441.14
 Elapsed covariance time in seconds:     0.00

 ********************                              MCMC BAYESIAN ANALYSIS                            ********************
 #OBJT:**************                       AVERAGE VALUE OF LIKELIHOOD FUNCTION                     ********************
 #OBJV:********************************************   -19185.246       **************************************************
 #OBJS:********************************************       87.411 (STD) **************************************************

 ********************                              MCMC BAYESIAN ANALYSIS                            ********************
 ********************                             FINAL PARAMETER ESTIMATE                           ********************

 THETA - VECTOR OF FIXED EFFECTS PARAMETERS   *********
         TH 1      TH 2      TH 3      TH 4      TH 5      TH 6      TH 7      TH 8      TH 9      TH10      TH11
         3.30E+00  3.26E+00 -6.13E-01 -2.10E-01  7.40E-01  1.16E+00  3.33E-01  1.87E-01  6.97E-01  2.30E+00  1.01E-01

 OMEGA - COV MATRIX FOR RANDOM EFFECTS - ETAS  ********
            ETA1      ETA2      ETA3      ETA4
 ETA1
+        1.03E-02
 ETA2
+        5.68E-05  8.23E-03
 ETA3
+        7.03E-04 -7.99E-04  8.29E-03
 ETA4
+       -6.72E-04  6.42E-04  1.27E-03  1.01E-02

 SIGMA - COV MATRIX FOR RANDOM EFFECTS - EPSILONS  ****
            EPS1
 EPS1
+        1.00E+00

 OMEGA - CORR MATRIX FOR RANDOM EFFECTS - ETAS  *******
            ETA1      ETA2      ETA3      ETA4
 ETA1
+        1.01E-01
 ETA2
+        3.87E-03  9.05E-02
 ETA3
+        6.97E-02 -9.44E-02  9.06E-02
 ETA4
+       -6.75E-02  6.51E-02  1.33E-01  1.00E-01

 SIGMA - CORR MATRIX FOR RANDOM EFFECTS - EPSILONS  ***
            EPS1
 EPS1
+        1.00E+00

 ********************                              MCMC BAYESIAN ANALYSIS                            ********************
 ********************                STANDARD ERROR OF ESTIMATE (From Sample Variance)               ********************

 THETA - VECTOR OF FIXED EFFECTS PARAMETERS   *********
         TH 1      TH 2      TH 3      TH 4      TH 5      TH 6      TH 7      TH 8      TH 9      TH10      TH11
         3.26E-02  2.70E-02  9.64E-03  7.98E-03  4.02E-02  3.50E-02  1.16E-02  1.04E-02  7.83E-03  6.85E-03  2.48E-03

 OMEGA - COV MATRIX FOR RANDOM EFFECTS - ETAS  ********
            ETA1      ETA2      ETA3      ETA4
 ETA1
+        9.53E-04
 ETA2
+        7.73E-04  1.21E-03
 ETA3
+        1.11E-03  1.12E-03  1.61E-03
 ETA4
+        8.57E-04  1.21E-03  9.87E-04  1.42E-03

 SIGMA - COV MATRIX FOR RANDOM EFFECTS - EPSILONS  ****
            EPS1
 EPS1
+        0.00E+00

 OMEGA - CORR MATRIX FOR RANDOM EFFECTS - ETAS  *******
            ETA1      ETA2      ETA3      ETA4
 ETA1
+        4.69E-03
 ETA2
+        8.42E-02  6.70E-03
 ETA3
+        1.19E-01  1.36E-01  8.96E-03
 ETA4
+        8.48E-02  1.29E-01  9.76E-02  7.08E-03

 SIGMA - CORR MATRIX FOR RANDOM EFFECTS - EPSILONS  ***
            EPS1
 EPS1
+        0.00E+00
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
 ********************                              MCMC BAYESIAN ANALYSIS                            ********************
 ********************           EIGENVALUES OF COR MATRIX OF ESTIMATE (From Sample Variance)         ********************

             1         2         3         4         5         6         7         8         9        10        11        12
             13        14        15        16        17        18        19        20        21
         2.60E-02  2.92E-02  3.36E-02  4.07E-02  1.66E-01  2.75E-01  3.46E-01  4.82E-01  5.31E-01  5.98E-01  6.72E-01  7.51E-01
          1.11E+00  1.22E+00  1.31E+00  1.49E+00  1.63E+00  1.88E+00  2.41E+00  2.76E+00  3.24E+00
 #TBLN:      6
 #METH: First Order Conditional Estimation with Interaction (No Prior)
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
 #TERM:
0MINIMIZATION SUCCESSFUL
 NO. OF FUNCTION EVALUATIONS USED:      447
 NO. OF SIG. DIGITS IN FINAL EST.:  3.0

 ETABAR IS THE ARITHMETIC MEAN OF THE ETA-ESTIMATES,
 AND THE P-VALUE IS GIVEN FOR THE NULL HYPOTHESIS THAT THE TRUE MEAN IS 0.

 ETABAR:         6.6878E-05 -1.0233E-03 -3.6847E-05 -9.6575E-04
 SE:             4.7163E-03  2.9845E-03  2.9484E-03  3.6723E-03
 N:                     400         400         400         400

 P VAL.:         9.8869E-01  7.3168E-01  9.9003E-01  7.9257E-01

 ETAshrink(%):   6.8613E+00  3.2964E+01  4.0979E+01  2.5217E+01
 EBVshrink(%):   6.9634E+00  3.3082E+01  4.1030E+01  2.5322E+01
 EPSshrink(%):   2.6153E+01

 #TERE:
 Elapsed estimation time in seconds:   114.27
 Elapsed covariance time in seconds:   847.82

 ********************          FIRST ORDER CONDITIONAL ESTIMATION WITH INTERACTION (NO PRIOR)        ********************
 #OBJT:**************                       MINIMUM VALUE OF OBJECTIVE FUNCTION                      ********************
 #OBJV:********************************************   -10772.143       **************************************************

 ********************          FIRST ORDER CONDITIONAL ESTIMATION WITH INTERACTION (NO PRIOR)        ********************
 ********************                             FINAL PARAMETER ESTIMATE                           ********************

 THETA - VECTOR OF FIXED EFFECTS PARAMETERS   *********
         TH 1      TH 2      TH 3      TH 4      TH 5      TH 6      TH 7      TH 8      TH 9      TH10      TH11
         3.31E+00  3.26E+00 -6.12E-01 -2.08E-01  7.35E-01  1.14E+00  3.36E-01  1.92E-01  6.95E-01  2.30E+00  1.00E-01

 OMEGA - COV MATRIX FOR RANDOM EFFECTS - ETAS  ********
            ETA1      ETA2      ETA3      ETA4
 ETA1
+        1.03E-02
 ETA2
+        1.92E-04  7.95E-03
 ETA3
+        1.28E-03 -1.70E-04  1.00E-02
 ETA4
+       -5.96E-04  5.42E-04  2.00E-03  9.67E-03

 SIGMA - COV MATRIX FOR RANDOM EFFECTS - EPSILONS  ****
            EPS1
 EPS1
+        1.00E+00

 OMEGA - CORR MATRIX FOR RANDOM EFFECTS - ETAS  *******
            ETA1      ETA2      ETA3      ETA4
 ETA1
+        1.01E-01
 ETA2
+        2.12E-02  8.92E-02
 ETA3
+        1.26E-01 -1.91E-02  1.00E-01
 ETA4
+       -5.97E-02  6.18E-02  2.03E-01  9.83E-02

 SIGMA - CORR MATRIX FOR RANDOM EFFECTS - EPSILONS  ***
            EPS1
 EPS1
+        1.00E+00

 ********************          FIRST ORDER CONDITIONAL ESTIMATION WITH INTERACTION (NO PRIOR)        ********************
 ********************                            STANDARD ERROR OF ESTIMATE                          ********************

 THETA - VECTOR OF FIXED EFFECTS PARAMETERS   *********
         TH 1      TH 2      TH 3      TH 4      TH 5      TH 6      TH 7      TH 8      TH 9      TH10      TH11
         3.27E-02  2.86E-02  9.52E-03  8.31E-03  3.92E-02  3.58E-02  1.13E-02  1.04E-02  1.05E-02  8.58E-03  2.83E-03

 OMEGA - COV MATRIX FOR RANDOM EFFECTS - ETAS  ********
            ETA1      ETA2      ETA3      ETA4
 ETA1
+        9.68E-04
 ETA2
+        8.28E-04  1.37E-03
 ETA3
+        1.28E-03  1.44E-03  3.05E-03
 ETA4
+        1.00E-03  1.10E-03  2.14E-03  1.92E-03

 SIGMA - COV MATRIX FOR RANDOM EFFECTS - EPSILONS  ****
            EPS1
 EPS1
+       .........

 OMEGA - CORR MATRIX FOR RANDOM EFFECTS - ETAS  *******
            ETA1      ETA2      ETA3      ETA4
 ETA1
+        4.77E-03
 ETA2
+        9.06E-02  7.71E-03
 ETA3
+        1.15E-01  1.62E-01  1.52E-02
 ETA4
+        1.04E-01  1.22E-01  1.76E-01  9.78E-03

 SIGMA - CORR MATRIX FOR RANDOM EFFECTS - EPSILONS  ***
            EPS1
 EPS1
+       .........
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
 ********************          FIRST ORDER CONDITIONAL ESTIMATION WITH INTERACTION (NO PRIOR)        ********************
 ********************                      EIGENVALUES OF COR MATRIX OF ESTIMATE                     ********************

             1         2         3         4         5         6         7         8         9        10        11        12
             13        14        15        16        17        18        19        20        21
         2.58E-02  2.77E-02  3.52E-02  4.44E-02  5.96E-02  2.05E-01  2.70E-01  2.98E-01  4.99E-01  5.62E-01  6.20E-01  6.79E-01
          1.10E+00  1.33E+00  1.36E+00  1.49E+00  1.56E+00  1.60E+00  2.40E+00  2.74E+00  4.09E+00
 #CPUT: Total CPU Time in Seconds,     2405.317
