Sun 10/25/2015
11:25 PM
;Model Desc: Two Compartment model with Clearance and central volume modeled with covariates age and gender
;Project Name: nm7examples
;Project ID: NO PROJECT DESCRIPTION
$PROBLEM    RUN# example2 (from sampc)
;; 1. Based on:0

;; 2. Description:

;;    Covariate Model CL and V with Gender and Age

;; 3. Label:

;;    2CMT

;; 4. Structural model:

;;    ADVAN3 TRANS4

;; 5. Covariate model:

;;    None

;; 6. Inter-individual variability:

;;    CL, V1, Q, V2

;; 7. Inter-occasion variability:

;;    None

;; 8. Residual variability:

;;    proportional

;; 9. Estimation:

;;    FOCE INTER, SAEM, BAYES, IMP
$INPUT      C SET ID JID TIME DV=CONC AMT=DOSE RATE EVID MDV CMT GNDR
            AGE
$DATA       example2.csv IGNORE=C
$SUBROUTINE ADVAN3 TRANS4
$PK
TVCL=THETA(1)
TVV1=THETA(2)
TVQ=THETA(3)
TVV2=THETA(4)
CL=TVCL*DEXP(ETA(1))
V1=TVV1*DEXP(ETA(2))
Q=TVQ*DEXP(ETA(3))
V2=TVV2*DEXP(ETA(4))
S1=V1

STRT = 0
IF(ID.GT.200) STRT = 1

$ERROR
CALLFL=0
; Option to model the residual error coefficient in THETA(11), rather than in SIGMA.
SDSL=THETA(5)
W=F*SDSL
Y = F + W*EPS(1)
IPRED=F
IWRES=(DV-F)/W

;Initial THETAs
$THETA  (0,1.0) ; [CL]
 (0,1.0) ; [V1]
 (0,1.0) ; [Q]
 (0,1.0) ; [V2]
 0.3 ; [SDSL]
;Initial OMEGAs
$OMEGA  BLOCK(4)
 0.5  ;    [varCL]
 0.001 0.5  ;    [varV1]
 0.001 0.001 0.5  ;     [varQ]
 0.001 0.001 0.001 0.5  ;    [varV2]
;SIGMA is 1.0 fixed, serves as unscaled variance for EPS(1).
; residual error scaling.
$SIGMA  1.0  FIX
$ESTIMATION METHOD=COND INTERACTION MAXEVAL=9999 NSIG=2 SIGL=14
            PRINT=5 NOABORT NOPRIOR=1
$COVARIANCE MATRIX=R UNCONDITIONAL PRINT=E
$TABLE      ID TIME DV IPRED PRED RES WRES CPRED CWRES EPRED ERES
            EWRES EVID NOAPPEND ONEHEADER FILE=example2.sdtab NOPRINT
$TABLE      ID CL V1 Q V2 ETA1 ETA2 ETA3 ETA4 NOAPPEND ONEHEADER
            NOPRINT FILE=example2.patab
$TABLE      ID AGE GNDR NOAPPEND ONEHEADER NOPRINT FILE=example2.catab

NM-TRAN MESSAGES
 WARNINGS AND ERRORS (IF ANY) FOR PROBLEM    1
 (WARNING  2) NM-TRAN INFERS THAT THE DATA ARE POPULATION.

1NONLINEAR MIXED EFFECTS MODEL PROGRAM (NONMEM) VERSION 7.3.0
 ORIGINALLY DEVELOPED BY STUART BEAL, LEWIS SHEINER, AND ALISON BOECKMANN
 CURRENT DEVELOPERS ARE ROBERT BAUER, ICON DEVELOPMENT SOLUTIONS,
 AND ALISON BOECKMANN. IMPLEMENTATION, EFFICIENCY, AND STANDARDIZATION
 PERFORMED BY NOUS INFOSYSTEMS.
 PROBLEM NO.:         1
 RUN# example2 (from sampc)
 TOT. NO. OF OBS RECS:     2000
 TOT. NO. OF INDIVIDUALS:    400
 TWO COMPARTMENT MODEL (ADVAN3)
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 #TBLN:      1
 #METH: First Order Conditional Estimation with Interaction (No Prior)
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
 #TERM:
0MINIMIZATION SUCCESSFUL
 NO. OF FUNCTION EVALUATIONS USED:      384
 NO. OF SIG. DIGITS IN FINAL EST.:  2.4

 ETABAR IS THE ARITHMETIC MEAN OF THE ETA-ESTIMATES,
 AND THE P-VALUE IS GIVEN FOR THE NULL HYPOTHESIS THAT THE TRUE MEAN IS 0.

 ETABAR:        -1.5695E+00 -1.8878E+00  4.0455E-02 -5.4604E-02
 SE:             3.8289E-02  1.6487E-02  4.2296E-03  4.3588E-03
 N:                     400         400         400         400

 P VAL.:         0.0000E+00  0.0000E+00  1.1435E-21  5.4685E-36

 ETAshrink(%):   3.2730E+01  8.5785E+01  5.9337E+01  5.6902E+01
 EBVshrink(%):   1.7975E-01  2.1319E-01  3.2247E+01  1.9895E+01
 EPSshrink(%):   4.3327E+01

 #TERE:
 Elapsed estimation time in seconds:    42.41
0R MATRIX ALGORITHMICALLY SINGULAR
 AND ALGORITHMICALLY NON-POSITIVE-SEMIDEFINITE
0COVARIANCE STEP ABORTED
 Elapsed covariance time in seconds:    12.78

 ********************          FIRST ORDER CONDITIONAL ESTIMATION WITH INTERACTION (NO PRIOR)        ********************
 #OBJT:**************                       MINIMUM VALUE OF OBJECTIVE FUNCTION                      ********************
 #OBJV:********************************************    -5494.546       **************************************************

 ********************          FIRST ORDER CONDITIONAL ESTIMATION WITH INTERACTION (NO PRIOR)        ********************
 ********************                             FINAL PARAMETER ESTIMATE                           ********************

 THETA - VECTOR OF FIXED EFFECTS PARAMETERS   *********
         TH 1      TH 2      TH 3      TH 4      TH 5
         3.48E+01  4.23E+01  1.92E+00  1.08E+01  1.38E-01

 OMEGA - COV MATRIX FOR RANDOM EFFECTS - ETAS  ********
            ETA1      ETA2      ETA3      ETA4
 ETA1
+        1.30E+00
 ETA2
+        5.79E-03  5.39E+00
 ETA3
+       -3.63E-04  4.84E-03  4.34E-02
 ETA4
+        6.81E-03  2.18E-02  2.43E-03  4.10E-02

 SIGMA - COV MATRIX FOR RANDOM EFFECTS - EPSILONS  ****
            EPS1
 EPS1
+        1.00E+00

 OMEGA - CORR MATRIX FOR RANDOM EFFECTS - ETAS  *******
            ETA1      ETA2      ETA3      ETA4
 ETA1
+        1.14E+00
 ETA2
+        2.19E-03  2.32E+00
 ETA3
+       -1.53E-03  1.00E-02  2.08E-01
 ETA4
+        2.95E-02  4.64E-02  5.76E-02  2.03E-01

 SIGMA - CORR MATRIX FOR RANDOM EFFECTS - EPSILONS  ***
            EPS1
 EPS1
+        1.00E+00
 #CPUT: Total CPU Time in Seconds,       56.438
