Sun 10/25/2015
11:41 PM
;Model Desc: Two Compartment model with Clearance and central volume modeled with covariates age and gender
;Project Name: nm7examples
;Project ID: NO PROJECT DESCRIPTION
$PROBLEM    RUN# example2 (from sampc)
;; 1. Based on:0

;; 2. Description:

;;    Covariate Model CL and V with Gender and Age

;; 3. Label:

;;    2CMT

;; 4. Structural model:

;;    ADVAN3 TRANS4

;; 5. Covariate model:

;;    None

;; 6. Inter-individual variability:

;;    CL, V1, Q, V2

;; 7. Inter-occasion variability:

;;    None

;; 8. Residual variability:

;;    proportional

;; 9. Estimation:

;;    FOCE INTER, SAEM, BAYES, IMP
$INPUT      C SET ID JID TIME DV=CONC AMT=DOSE RATE EVID MDV CMT GNDR
            AGE
$DATA       example2.csv IGNORE=C
$SUBROUTINE ADVAN3 TRANS4
$PK

;;; V1GNDR-DEFINITION START
IF(GNDR.EQ.1) V1GNDR = 1  ; Most common
IF(GNDR.EQ.0) V1GNDR = ( 1 + THETA(9))
;;; V1GNDR-DEFINITION END

;;; V1AGE-DEFINITION START
   V1AGE = ((AGE/33.72)**THETA(8))
;;; V1AGE-DEFINITION END

;;; V1-RELATION START
V1COV=V1AGE*V1GNDR
;;; V1-RELATION END

;;; CLGNDR-DEFINITION START
IF(GNDR.EQ.1) CLGNDR = 1  ; Most common
IF(GNDR.EQ.0) CLGNDR = ( 1 + THETA(7))
;;; CLGNDR-DEFINITION END

;;; CLAGE-DEFINITION START
   CLAGE = ((AGE/33.72)**THETA(6))
;;; CLAGE-DEFINITION END

;;; CL-RELATION START
CLCOV=CLAGE*CLGNDR
;;; CL-RELATION END

TVCL=THETA(1)

TVCL = CLCOV*TVCL
TVV1=THETA(2)

TVV1 = V1COV*TVV1
TVQ=THETA(3)
TVV2=THETA(4)
CL=TVCL*DEXP(ETA(1))
V1=TVV1*DEXP(ETA(2))
Q=TVQ*DEXP(ETA(3))
V2=TVV2*DEXP(ETA(4))
S1=V1

STRT = 0
IF(ID.GT.200) STRT = 1

$ERROR
CALLFL=0
; Option to model the residual error coefficient in THETA(11), rather than in SIGMA.
SDSL=THETA(5)
W=F*SDSL
Y = F + W*EPS(1)
IPRED=F
IWRES=(DV-F)/W

;Initial THETAs
$THETA  (0,11.8883) ; [CL]
 (0,6.45977) ; [V1]
 (0,2.01918) ; [Q]
 (0,10.0723) ; [V2]
 0.10037 ; [SDSL]
;Initial OMEGAs
$THETA  (-1000000,-0.384256,1000000) ; CLAGE1
$THETA  (-1,-0.717115,5) ; CLGNDR1
$THETA  (-1000000,0.252035,1000000) ; V1AGE1
$THETA  (-1,-0.001,5) ; V1GNDR1
$OMEGA  BLOCK(4)
 0.0404402  ;    [varCL]
 -0.0128211 0.0139139  ;    [varV1]
 -0.000506392 0.000487936 0.0101273  ;     [varQ]
 -0.00399438 0.00192543 0.00220246 0.00986476  ;    [varV2]
;SIGMA is 1.0 fixed, serves as unscaled variance for EPS(1).
; residual error scaling.
$SIGMA  1.0  FIX
$ESTIMATION METHOD=COND INTERACTION MAXEVAL=9999 NSIG=2 SIGL=14
            PRINT=5 NOABORT NOPRIOR=1
$COVARIANCE MATRIX=R UNCONDITIONAL PRINT=E
$TABLE      ID TIME DV IPRED PRED RES WRES CPRED CWRES EPRED ERES
            EWRES EVID NOAPPEND ONEHEADER
            FILE=V1GNDR2.mod.example2.sdtab NOPRINT
$TABLE      ID CL V1 Q V2 ETA1 ETA2 ETA3 ETA4 NOAPPEND ONEHEADER
            NOPRINT FILE=V1GNDR2.mod.example2.patab
$TABLE      ID AGE GNDR NOAPPEND ONEHEADER NOPRINT
            FILE=V1GNDR2.mod.example2.catab

NM-TRAN MESSAGES
 WARNINGS AND ERRORS (IF ANY) FOR PROBLEM    1
 (WARNING  2) NM-TRAN INFERS THAT THE DATA ARE POPULATION.

1NONLINEAR MIXED EFFECTS MODEL PROGRAM (NONMEM) VERSION 7.3.0
 ORIGINALLY DEVELOPED BY STUART BEAL, LEWIS SHEINER, AND ALISON BOECKMANN
 CURRENT DEVELOPERS ARE ROBERT BAUER, ICON DEVELOPMENT SOLUTIONS,
 AND ALISON BOECKMANN. IMPLEMENTATION, EFFICIENCY, AND STANDARDIZATION
 PERFORMED BY NOUS INFOSYSTEMS.
 PROBLEM NO.:         1
 RUN# example2 (from sampc)
 TOT. NO. OF OBS RECS:     2000
 TOT. NO. OF INDIVIDUALS:    400
 TWO COMPARTMENT MODEL (ADVAN3)
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 #TBLN:      1
 #METH: First Order Conditional Estimation with Interaction (No Prior)
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
 #TERM:
0MINIMIZATION SUCCESSFUL
 NO. OF FUNCTION EVALUATIONS USED:      364
 NO. OF SIG. DIGITS IN FINAL EST.:  2.6

 ETABAR IS THE ARITHMETIC MEAN OF THE ETA-ESTIMATES,
 AND THE P-VALUE IS GIVEN FOR THE NULL HYPOTHESIS THAT THE TRUE MEAN IS 0.

 ETABAR:         1.0663E-04 -1.0463E-03 -1.5362E-04 -9.9869E-04
 SE:             9.9702E-03  4.5216E-03  2.9134E-03  3.6313E-03
 N:                     400         400         400         400

 P VAL.:         9.9147E-01  8.1701E-01  9.5795E-01  7.8330E-01

 ETAshrink(%):   1.6715E+00  1.9532E+01  4.1028E+01  2.5430E+01
 EBVshrink(%):   1.7528E+00  1.9734E+01  4.1067E+01  2.5514E+01
 EPSshrink(%):   2.6978E+01

 #TERE:
 Elapsed estimation time in seconds:    22.64
 Elapsed covariance time in seconds:    29.88

 ********************          FIRST ORDER CONDITIONAL ESTIMATION WITH INTERACTION (NO PRIOR)        ********************
 #OBJT:**************                       MINIMUM VALUE OF OBJECTIVE FUNCTION                      ********************
 #OBJV:********************************************   -10195.277       **************************************************

 ********************          FIRST ORDER CONDITIONAL ESTIMATION WITH INTERACTION (NO PRIOR)        ********************
 ********************                             FINAL PARAMETER ESTIMATE                           ********************

 THETA - VECTOR OF FIXED EFFECTS PARAMETERS   *********
         TH 1      TH 2      TH 3      TH 4      TH 5      TH 6      TH 7      TH 8      TH 9
         1.20E+01  6.24E+00  2.00E+00  1.00E+01  1.00E-01 -3.82E-01 -7.23E-01  2.53E-01  7.20E-02

 OMEGA - COV MATRIX FOR RANDOM EFFECTS - ETAS  ********
            ETA1      ETA2      ETA3      ETA4
 ETA1
+        4.12E-02
 ETA2
+       -1.20E-02  1.27E-02
 ETA3
+        9.37E-04  2.05E-04  9.79E-03
 ETA4
+       -2.74E-03  1.48E-03  1.84E-03  9.51E-03

 SIGMA - COV MATRIX FOR RANDOM EFFECTS - EPSILONS  ****
            EPS1
 EPS1
+        1.00E+00

 OMEGA - CORR MATRIX FOR RANDOM EFFECTS - ETAS  *******
            ETA1      ETA2      ETA3      ETA4
 ETA1
+        2.03E-01
 ETA2
+       -5.25E-01  1.13E-01
 ETA3
+        4.66E-02  1.85E-02  9.89E-02
 ETA4
+       -1.38E-01  1.35E-01  1.90E-01  9.75E-02

 SIGMA - CORR MATRIX FOR RANDOM EFFECTS - EPSILONS  ***
            EPS1
 EPS1
+        1.00E+00

 ********************          FIRST ORDER CONDITIONAL ESTIMATION WITH INTERACTION (NO PRIOR)        ********************
 ********************                            STANDARD ERROR OF ESTIMATE                          ********************

 THETA - VECTOR OF FIXED EFFECTS PARAMETERS   *********
         TH 1      TH 2      TH 3      TH 4      TH 5      TH 6      TH 7      TH 8      TH 9
         1.79E-01  7.08E-02  2.12E-02  8.64E-02  2.86E-03  1.19E-02  5.86E-03  8.59E-03  1.69E-02

 OMEGA - COV MATRIX FOR RANDOM EFFECTS - ETAS  ********
            ETA1      ETA2      ETA3      ETA4
 ETA1
+        3.24E-03
 ETA2
+        1.72E-03  1.78E-03
 ETA3
+        2.23E-03  1.60E-03  3.09E-03
 ETA4
+        1.86E-03  1.28E-03  2.17E-03  1.94E-03

 SIGMA - COV MATRIX FOR RANDOM EFFECTS - EPSILONS  ****
            EPS1
 EPS1
+       .........

 OMEGA - CORR MATRIX FOR RANDOM EFFECTS - ETAS  *******
            ETA1      ETA2      ETA3      ETA4
 ETA1
+        7.98E-03
 ETA2
+        6.75E-02  7.90E-03
 ETA3
+        1.09E-01  1.42E-01  1.56E-02
 ETA4
+        9.78E-02  1.10E-01  1.84E-01  9.92E-03

 SIGMA - CORR MATRIX FOR RANDOM EFFECTS - EPSILONS  ***
            EPS1
 EPS1
+       .........
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
 ********************          FIRST ORDER CONDITIONAL ESTIMATION WITH INTERACTION (NO PRIOR)        ********************
 ********************                      EIGENVALUES OF COR MATRIX OF ESTIMATE                     ********************

             1         2         3         4         5         6         7         8         9        10        11        12
             13        14        15        16        17        18        19
         5.87E-02  1.82E-01  1.93E-01  2.59E-01  3.27E-01  3.53E-01  3.80E-01  5.08E-01  6.04E-01  6.27E-01  8.84E-01  9.89E-01
          1.07E+00  1.22E+00  1.37E+00  1.90E+00  2.15E+00  2.64E+00  3.29E+00
 #CPUT: Total CPU Time in Seconds,       53.656
